// SBML level 2 version 1

model model_0000001()
  // Somogyi1990_CaOscillations_SingleCaSpike
  // Another model from Hormone induced Calcium Oscillations in Liver Cells Can Be Explained by a Simply One Pool Model. Anatomy of a single Ca2+ spike. Figure4A has been simulated by COPASI4.0.20(development). However, the simulated figure is slightly different from the paper, single spike of Ca2+ is around "6" time arbitrary units instead "9" time arbitrary units displayed in the paper.
  // To the extent possible under law, all copyright and related or neighbouring rights to this encoded model have been dedicated to the public domain worldwide. Please refer to CC0 Public Domain Dedication for more information.
  // In summary, you are entitled to use this encoded model in absolutely any manner you deem suitable, verbatim, or with modification, alone or embedded it in a larger context, redistribute it, commercially or not, in a restricted way or not.
  // To cite BioModels Database, please use: Li C, Donizelli M, Rodriguez N, Dharuri H, Endler L, Chelliah V, Li L, He E, Henry A, Stefan MI, Snoep JL, Hucka M, Le Novère N, Laibe C (2010) BioModels Database: An enhanced, curated and annotated resource for published quantitative kinetic models. BMC Syst Biol., 4:92.
  // biomodels.db:MODEL8910960676
  // biomodels.db:BIOMD0000000115
  // isDescribedBy pubmed:1904060
  // hasTaxon taxonomy:10114
  // isVersionOf GO:0051924 GO:0009755 GO:0019722
  // hasProperty mamo:MAMO_0000046

  // Compartments:
  compartment Cytosol = 1;  // isVersionOf GO:0005829
  compartment ER = 1; ER is "Endoplasmic Reticulum";  // isVersionOf GO:0005783
  compartment Extracellular = 1;  // isVersionOf GO:0005576

  // Species:
  species x in ER = 1; x is "Ca_ER";  // CHEBI:29108 kegg.compound:C00076
  species y in Cytosol = 1; y is "Ca_Cyt";  // CHEBI:29108 kegg.compound:C00076

  // Parameters:
  k = 0.01;
  alpha = 10;
  n = 4;
  a = 1.4;
  k1 = 2;
  beta = 1;
  gamma = 1;

  // Assignment rules:
  // InsP3 induced calcium release channel.
  fy := y^n/(a^n + y^n);

  // Reactions:
  Ca_flux_into_the_cell: => y; gamma*Cytosol;  // isVersionOf GO:0006816 GO:0007204
  reaction_0000002: x => y; Cytosol*k*(x - y); reaction_0000002 is "Ca translocation from ER to Cytosol";  // isVersionOf GO:0032471 GO:0007204 GO:0006816
  Ca_transport_from_Cytosol_to_ER: y => x; k1*y*ER;  // isVersionOf GO:0032470 GO:0006816 GO:0051481
  InsP3_channel: x => y; alpha*fy*(x - y)*Cytosol;  // isVersionOf GO:0006816 GO:0051482 GO:0005220
  Ca_pumped_ouside_the_cell: y => ; beta*y*Extracellular;  // isVersionOf GO:0051481 GO:0006816 GO:0005388
end
