// SBML level 2 version 4
// dcterms:bibliographicCitation: urn:miriam:pubmed:23717504

function Function_for_reaction_1(alpha, sub, g, S, K_S)
  alpha*sub^g*(1 - S/K_S);
end

function Function_for_reaction_2(alpha, S, g, K_S, g2)
  alpha*S^g*(1 - S/K_S)*g2;
end

function Function_for_reaction_3(alpha, pro, g, S, K_S)
  alpha*pro^g*(1 - S/K_S);
end

function Function_for_reaction_4(beta1, P, f12, C, f14)
  beta1*P^f12*C^f14;
end

function Function_for_reaction_6_and_8(beta, sub, f)
  beta*sub^f;
end

function Function_for_reaction_7(alpha, S, g41, P, g42, epsilon, B, g43, K_S, g44)
  alpha*S^g41*P^g42*(epsilon + B)^g43*(1 - S/K_S)^g44;
end

function Function_for_reaction_9(k1, C)
  k1*C;
end

function Function_for_reaction_10(k2, B)
  k2*B;
end

model New_Model()
  // Graham2013 - Role of osteocytes in targeted bone remodeling
  // biomodels.db:MODEL1811150001 biomodels.db:BIOMD0000000721
  // hasProperty mamo:MAMO_0000046
  // hasProperty GO:0046849
  // hasTaxon taxonomy:9606
  // isDescribedBy pubmed:23717504
  // isDescribedBy pubmed:23717504

  // Compartments:
  compartment Bone = 1;  // hasProperty BTO:0000140

  // Species:
  species Osteocytes__S in Bone = K_S - rho; Osteocytes__S is "Osteocytes (S)";  // BTO:0002038
  species Pre_Osteoblasts__P in Bone = 0; Pre_Osteoblasts__P is "Pre-Osteoblasts (P)";  // isVersionOf BTO:0001593
  species Osteoblasts__B in Bone = 0; Osteoblasts__B is "Osteoblasts (B)";  // BTO:0001593
  species Osteoclasts__C in Bone = 0; Osteoclasts__C is "Osteoclasts (C)";  // BTO:0000968
  species Bone_volume__z in Bone = 100; Bone_volume__z is "Bone volume (z)";

  // Parameters:
  alpha_1 = 0.5;
  alpha_2 = 0.1;
  alpha_3 = 0.1;
  beta_1 = 0.1;
  delta = 0.1;
  beta_2 = 0.1;
  alpha_4 = 0.1;
  K_S = 200;
  k1 = 0.7;
  k2 = 0.015445;
  g_31 = 1;
  g_21 = 2;
  g_22 = 1;
  g_32 = 1;
  g_41 = 1;
  g_42 = 1;
  g_43 = -1;
  g_44 = 1;
  f_12 = 1;
  f_14 = 1;
  f_23 = 1;
  f_34 = 1;
  epsilon = 1;
  beta_3 = 0.1;
  rho = 20;

  // Reactions:
  Differentiation_of_Osteoblast_to_Osteocytes: Osteoblasts__B => Osteocytes__S; Bone*Function_for_reaction_1(alpha_1, Osteoblasts__B, g_31, Osteocytes__S, K_S);  // isVersionOf omit:0003784
  Differentiation_of_MSC_cells_to_Pre_Osteoblast_cells: => Pre_Osteoblasts__P; Bone*Function_for_reaction_2(alpha_2, Osteocytes__S, g_21, K_S, g_22); Differentiation_of_MSC_cells_to_Pre_Osteoblast_cells is "Differentiation of MSC cells to Pre-Osteoblast cells";  // modifiers: Osteocytes__S; isVersionOf omit:0003784
  Proliferation_of_pre_osteoblasts: => Pre_Osteoblasts__P; Bone*Function_for_reaction_3(alpha_3, Pre_Osteoblasts__P, g_32, Osteocytes__S, K_S); Proliferation_of_pre_osteoblasts is "Proliferation of pre-osteoblasts";  // modifiers: Osteocytes__S; isVersionOf GO:0033687
  Differentiation_of_Pre_Osteoblast_to_mature_osteoblast: Pre_Osteoblasts__P => Osteoblasts__B; Bone*Function_for_reaction_4(beta_1, Pre_Osteoblasts__P, f_12, Osteoclasts__C, f_14); Differentiation_of_Pre_Osteoblast_to_mature_osteoblast is "Differentiation of Pre-Osteoblast to mature osteoblast";  // modifiers: Osteoclasts__C; isVersionOf omit:0003784
  Apoptosis_of_pre_osteoblast: Pre_Osteoblasts__P => ; Bone*delta*Pre_Osteoblasts__P; Apoptosis_of_pre_osteoblast is "Apoptosis of pre-osteoblast";  // isVersionOf ncit:C17557
  Apoptosis_of_osteoblasts: Osteoblasts__B => ; Bone*Function_for_reaction_6_and_8(beta_2, Osteoblasts__B, f_23);  // isVersionOf ncit:C17557
  Differentiation_of_pre_osteoclast_to_osteoclasts: => Osteoclasts__C; Bone*Function_for_reaction_7(alpha_4, Osteocytes__S, g_41, Pre_Osteoblasts__P, g_42, epsilon, Osteoblasts__B, g_43, K_S, g_44); Differentiation_of_pre_osteoclast_to_osteoclasts is "Differentiation of pre-osteoclast to osteoclasts";  // modifiers: Osteocytes__S, Pre_Osteoblasts__P, Osteoblasts__B; isVersionOf omit:0003784
  Apoptosis_of_osteoclasts: Osteoclasts__C => ; Bone*Function_for_reaction_6_and_8(beta_3, Osteoclasts__C, f_34);  // isVersionOf ncit:C17557
  Resorption_of_bone: Bone_volume__z => ; Bone*Function_for_reaction_9(k1, Osteoclasts__C);  // modifiers: Osteoclasts__C; isVersionOf omit:0003220
  Formation_of_bone: => Bone_volume__z; Bone*Function_for_reaction_10(k2, Osteoblasts__B);  // modifiers: Osteoblasts__B; isVersionOf ncit:C53954

  // Unit definitions:
  unit volume = 1e-3 litre;
  unit time = 86400 second;
  unit substance = 1e-3 mole;
end
