// SBML level 2 version 4
// dcterms:bibliographicCitation: Modelling of Anti-Tumour Immune Response: Immunocorrective Effect of Weak Centimetre Electromagnetic Waves urn:miriam:doi:10.1080/17486700802373540

function Function_for_activation_and_transfer_of_cytotoxic_T_lymphocyte_at_the_site_of_tumor(Vl, alpha_L, L, I2)
  Vl + alpha_L*L*I2;
end

function Function_for_secretion_of_interleukin_2(alpha_I2, T, K_T)
  alpha_I2*T/(T + K_T);
end

function Function_for_removal_of_interleukin2_from_site_of_tumor(alpha_bar_L, L, I2, gama_T, T)
  alpha_bar_L*L*I2 + gama_T*T*I2;
end

function Function_for_Deactivation_and_removal_of_cytotoxic_T_lymphocyte_from_the_site_of_action(beta_L, L)
  beta_L*L;
end

function Function_for_formation_and_removal_of_tumor(alpha_T, T, beta_T, gama_prime_L, L)
  alpha_T*T*ln(beta_T*T/alpha_T) + gama_prime_L*L*T;
end

model Isaeva2008___Modelling_of_Anti_Tumour_Immune_Response_Immunocorrective_Effect_of_Weak_Centimetre_Electromagnetic_Waves()
  // Isaeva2008 - Modelling of Anti-Tumour Immune Response Immunocorrective Effect of Weak Centimetre Electromagnetic Waves
  // Modelling of anti-tumour immune response: Immunocorrective effect
  // of weak centimetre electromagnetic waves
  // O.G. Isaeva* and V.A. Osipov
  // Bogoliubov Laboratory of Theoretical Physics, Joint Institute for Nuclear Research, Dubna,
  // Moscow Region, Russia
  // We formulate the dynamical model for the anti-tumour immune response based on
  // intercellular cytokine-mediated interactions with the interleukin-2 (IL-2) taken into
  // account. The analysis shows that the expression level of tumour antigens on antigen
  // presenting cells has a distinct influence on the tumour dynamics. At low antigen
  // presentation, a progressive tumour growth takes place to the highest possible value.
  // At high antigen presentation, there is a decrease in tumour size to some value when the
  // dynamical equilibrium between the tumour and the immune system is reached. In the
  // case of the medium antigen presentation, both these regimes can be realized depending
  // on the initial tumour size and the condition of the immune system. A pronounced
  // immunomodulating effect (the suppression of tumour growth and the normalization of
  // IL-2 concentration) is established by considering the influence of low-intensity
  // electromagnetic microwaves as a parametric perturbation of the dynamical system. This
  // finding is in qualitative agreement with the recent experimental results on
  // immunocorrective effects of centimetre electromagnetic waves in tumour-bearing mice.
  // Keywords: carcinogenesis; interleukin-2; modelling; anti-tumour immunity;
  // electromagnetic waves
  // isDescribedBy doi:10.1080/17486700802373540
  // isVersionOf ncit:C17050
  // hasTaxon taxonomy:9606
  // hasProperty mamo:MAMO_0000046
  // biomodels.db:MODEL2001140001 biomodels.db:BIOMD0000000910

  // Compartments:
  compartment compartment = 1;

  // Species:
  species L in compartment = 240000;  // hasProperty ncit:C12543
  species T in compartment = 200000;  // hasInstance ncit:C12922
  species I2 in compartment = 36000000;  // isInstanceOf uniprot:P60568

  // Parameters:
  alpha_T = 0.22;
  beta_T = 8.4e-8;
  gama_prime_L = 4e-7;
  VL = 79000;
  alpha_L = 9.9e-9;
  beta_L = 0.33;
  alpha_I2 = 12500000;
  alpha_bar_L = 6.6e-8;
  gama_T = 6.6e-7;
  K_T = 52000;

  // Reactions:
  Activation_and_transfer_of_cytotoxic_T_lymphocyte_at_the_site_of_tumor: => L; compartment*Function_for_activation_and_transfer_of_cytotoxic_T_lymphocyte_at_the_site_of_tumor(VL, alpha_L, L, I2);  // modifiers: I2; isVersionOf GO:2000404
  Deactivation_and_removal_of_cytotoxic_T_lymphocyte_from_the_site_of_action: L => ; compartment*Function_for_Deactivation_and_removal_of_cytotoxic_T_lymphocyte_from_the_site_of_action(beta_L, L);  // isVersionOf GO:2000404
  Formation_and_removal_of_tumor: T => ; compartment*Function_for_formation_and_removal_of_tumor(alpha_T, T, beta_T, gama_prime_L, L);  // modifiers: L; isVersionOf GO:0002357
  Secretion_of_interleukin_2: => I2; compartment*Function_for_secretion_of_interleukin_2(alpha_I2, T, K_T);  // modifiers: T; isVersionOf GO:0072631
  Removal_of_interleukin_2_from_site_of_tumor: I2 => ; compartment*Function_for_removal_of_interleukin2_from_site_of_tumor(alpha_bar_L, L, I2, gama_T, T);  // modifiers: L, T; isVersionOf GO:1900040

  // Unit definitions:
  unit volume = 1e-3 litre;
  unit substance = 1e-3 mole;
end
