// SBML level 2 version 4
// dcterms:bibliographicCitation: http://identifiers.org/pubmed/21414480

function Constant_flux__irreversible(v)
  v;
end
Constant_flux__irreversible is "Constant flux (irreversible)";

function function_for_APC_activation_1(APC_active, CDK1_active, a2, k2, n2)
  a2*(1 - APC_active)*CDK1_active^n2/(k2^n2 + CDK1_active^n2);
end

function function_for_cdk1_inactivation_1(APC_active, CDK1_active, b1, k1, n1)
  b1*CDK1_active*APC_active^n1/(k1^n1 + APC_active^n1);
end

model Ferrel2011___Cdk1_and_APC_regulation_in_cell_cycle_in_Xenopus_laevis()
  // Ferrel2011 - Cdk1 and APC regulation in cell cycle in Xenopus laevis
  // biomodels.db:MODEL1809040003 biomodels.db:BIOMD0000000935
  // hasPart GO:0051726
  // hasTaxon taxonomy:8355
  // isDescribedBy pubmed:21414480
  // hasProperty mamo:MAMO_0000046
  // isDescribedBy pubmed:21414480

  // Compartments:
  compartment nuclear = 1;  // isVersionOf ncit:C13361

  // Species:
  species CDK1_active in nuclear = 0;  // isVersionOf uniprot:P35567; hasProperty PATO:0002354; hasProperty PATO:0002354
  species APC_active in nuclear = 0;  // isVersionOf uniprot:P70039; hasProperty PATO:0002354; hasProperty PATO:0002354

  // Parameters:
  a1 = 0.1;
  b1 = 3;
  k1 = 0.5;
  n1 = 8;
  a2 = 3;
  b2 = 1;
  k2 = 0.5;
  n2 = 8;

  // Reactions:
  R1_Cdk1_activation_by_cyclin_synthesis: => CDK1_active; nuclear*Constant_flux__irreversible(a1);  // isVersionOf ncit:C64382
  R2_Cdk1_inactivation_by_APC_active: CDK1_active => ; nuclear*function_for_cdk1_inactivation_1(APC_active, CDK1_active, b1, k1, n1);  // modifiers: APC_active
  R3_APC_activation_by_Cdk1_active: => APC_active; nuclear*function_for_APC_activation_1(APC_active, CDK1_active, a2, k2, n2);  // modifiers: CDK1_active; isVersionOf ncit:C64382
  R4_APC_Inactivation: APC_active => ; nuclear*b2*APC_active;

  // Unit definitions:
  unit volume = 1e-3 litre;
  unit substance = 1e-3 mole;
end
