// SBML level 2 version 4
// dcterms:bibliographicCitation: urn:miriam:pubmed:21414480

function Constant_flux__irreversible(v)
  v;
end
Constant_flux__irreversible is "Constant flux (irreversible)";

function function_for_APC_activation(a2, product, modifier, n2, k2)
  a2*(1 - product)*modifier^n2/(k2^n2 + modifier^n2);
end

function function_for_cdk1_inactivation(b1, modifier, n1, k1, substrate)
  b1*substrate*modifier^n1/(k1^n1 + modifier^n1);
end

model Ferrel2011___Autonomous_biochemical_oscillator_in_regulation_of_CDK1__Plk1__and_APC_in_Xenopus_Laevis_cell_cycle()
  // Ferrel2011 - Autonomous biochemical oscillator in regulation of CDK1, Plk1, and APC in Xenopus Laevis cell cycle
  // Computational modeling and the theory of nonlinear dynamical systems allow one to not simply describe the events of the cell cycle, but also to understand why these events occur, just as the theory of gravitation allows one to understand why cannonballs fly in parabolic arcs. The simplest examples of the eukaryotic cell cycle operate like autonomous oscillators. Here, we present the basic theory of oscillatory biochemical circuits in the context of the Xenopus embryonic cell cycle. We examine Boolean models, delay differential equation models, and especially ordinary differential equation (ODE) models. For ODE models, we explore what it takes to get oscillations out of two simple types of circuits (negative feedback loops and coupled positive and negative feedback loops). Finally, we review the procedures of linear stability analysis, which allow one to determine whether a given ODE model and a particular set of kinetic parameters will produce oscillations.
  // biomodels.db:MODEL1809040004 biomodels.db:BIOMD0000000937
  // hasPart GO:0051726
  // hasTaxon taxonomy:8355
  // isDescribedBy pubmed:21414480
  // hasProperty mamo:MAMO_0000046
  // isDescribedBy pubmed:21414480

  // Compartments:
  compartment compartment = 1; compartment is "nuclear";  // isVersionOf ncit:C13361

  // Species:
  species CDK1_active in compartment = 0;  // isVersionOf uniprot:P35567; hasProperty PATO:0002354
  species APC_active in compartment = 0;  // isVersionOf uniprot:P70039; hasProperty PATO:0002354
  species Plk1_active in compartment = 0;  // isVersionOf uniprot:P70032; hasProperty PATO:0002354

  // Parameters:
  a1 = 0.1;
  a2 = 3;
  a3 = 3;
  b1 = 3;
  b2 = 1;
  b3 = 1;
  k1 = 0.5;
  k2 = 0.5;
  k3 = 0.5;
  n1 = 8;
  n2 = 8;
  n3 = 8;

  // Reactions:
  R1_Cdk1_activation_by_cyclin_synthesis: => CDK1_active; compartment*Constant_flux__irreversible(a1);  // isVersionOf ncit:C64382
  R2_Cdk1_inactivation_by_APC_active: CDK1_active => ; compartment*function_for_cdk1_inactivation(b1, APC_active, n1, k1, CDK1_active);  // modifiers: APC_active
  R3_APC_activation_by_Cdk1_active: => APC_active; compartment*function_for_APC_activation(a3, APC_active, Plk1_active, n3, k3);  // modifiers: Plk1_active; isVersionOf ncit:C64382
  R4_APC_Inactivation: APC_active => ; compartment*b3*APC_active;
  R5_Plk1_activation_by: => Plk1_active; compartment*function_for_APC_activation(a2, Plk1_active, CDK1_active, n2, k2);  // modifiers: CDK1_active; isVersionOf ncit:C64382
  R6_Plk1_inactivation: Plk1_active => ; compartment*b2*Plk1_active;

  // Unit definitions:
  unit volume = 1e-3 litre;
  unit substance = 1e-3 mole;
end
