// SBML level 2 version 4
// dcterms:bibliographicCitation: urn:miriam:pubmed:20844798

model Luan2010___Blood_Coagulation_Model__extension_of_Luan2007()
  // Luan2010 - Blood Coagulation Model (extension of Luan2007)
  // Mathematical model of blood coagulation. Extension of Luan2007. New reactions, e.g., the activation of platelet by thrombin through PARs, the release of ADP and TXA2 from activated platelets, platelet activation by ADP and TXA2, the intrinsic pathway reactions, were added to the model.
  // isVersionOf GO:0007596
  // isDescribedBy pubmed:20844798

  // Compartments:
  compartment compartment = 1;

  // Species:
  species TF in compartment = 0;
  species VII in compartment = 0;
  species VII_TF in compartment = 0; VII_TF is "VII-TF";
  species VIIa in compartment = 0;
  species Viia_TF in compartment = 0; Viia_TF is "Viia-TF";
  species Xa in compartment = 0;
  species Xa_VII_TF in compartment = 0; Xa_VII_TF is "Xa-VII-TF";
  species VIIa_TF in compartment = 0; VIIa_TF is "VIIa-TF";
  species IIa in compartment = 0;
  species IIa_VII_TF in compartment = 0; IIa_VII_TF is "IIa-VII-TF";
  species X in compartment = 0;
  species X_VIIa_TF in compartment = 0; X_VIIa_TF is "X-VIIa-TF";
  species IX in compartment = 0;
  species IX_VIIa_TF in compartment = 0; IX_VIIa_TF is "IX-VIIa-TF";
  species IXa in compartment = 0;
  species VII_Xa in compartment = 0; VII_Xa is "VII-Xa";
  species VII_IIa in compartment = 0; VII_IIa is "VII-IIa";
  species V in compartment = 0;
  species V_IIa in compartment = 0; V_IIa is "V-IIa";
  species Va in compartment = 0;
  species VIII in compartment = 0;
  species VIII_IIa in compartment = 0; VIII_IIa is "VIII-IIa";
  species VIIIa in compartment = 0;
  species Xa_IX in compartment = 0; Xa_IX is "Xa-IX";
  species Xa_V in compartment = 0; Xa_V is "Xa-V";
  species Xa_VIII in compartment = 0; Xa_VIII is "Xa-VIII";
  species II in compartment = 0;
  species Xa_II in compartment = 0; Xa_II is "Xa-II";
  species IX_P9s in compartment = 0; IX_P9s is "IX-P9s";
  species P9s in compartment = 0;
  species IXa_P9s in compartment = 0; IXa_P9s is "IXa-P9s";
  species IXa_P9s_0 in compartment = 0; IXa_P9s_0 is "IXa-P9s*";
  species P9s_0 in compartment = 0; P9s_0 is "P9s*";
  species P10s in compartment = 0;
  species X_P10s in compartment = 0; X_P10s is "X-P10s";
  species Xa_P10s in compartment = 0; Xa_P10s is "Xa-P10s";
  species P5s in compartment = 0;
  species V_P5s in compartment = 0; V_P5s is "V-P5s";
  species Va_P5s in compartment = 0; Va_P5s is "Va-P5s";
  species P8s in compartment = 0;
  species VIII_P8s in compartment = 0; VIII_P8s is "VIII-P8s";
  species VIIIa_P8s in compartment = 0; VIIIa_P8s is "VIIIa-P8s";
  species II_P2s in compartment = 0; II_P2s is "II-P2s";
  species P2s in compartment = 0;
  species IIa_P2s in compartment = 0; IIa_P2s is "IIa-P2s";
  species AP_Psub in compartment = 0; AP_Psub is "AP-Psub";
  species PL in compartment = 0;
  species Psub in compartment = 0;
  species PL_Psub in compartment = 0; PL_Psub is "PL-Psub";
  species AP in compartment = 0;
  species PL_AP in compartment = 0; PL_AP is "PL-AP";
  species PL_AP_Psub in compartment = 0; PL_AP_Psub is "PL-AP-Psub";
  species V_P5s_Xa_P10s in compartment = 0; V_P5s_Xa_P10s is "V-P5s-Xa-P10s";
  species V_P5s_IIa_P2s in compartment = 0; V_P5s_IIa_P2s is "V-P5s-IIa-P2s";
  species X_P10s_tenase in compartment = 0; X_P10s_tenase is "X-P10s-tenase";
  species tenase in compartment = 0;
  species X_P10s_tenase_0 in compartment = 0; X_P10s_tenase_0 is "X-P10s-tenase*";
  species tenase_0 in compartment = 0; tenase_0 is "tenase*";
  species VIII_P8s_Xa_P10s in compartment = 0; VIII_P8s_Xa_P10s is "VIII-P8s-Xa-P10s";
  species VIII_P8s_IIa_P2s in compartment = 0; VIII_P8s_IIa_P2s is "VIII-P8s-IIa-P2s";
  species II_P2s_prothrombinase in compartment = 0; II_P2s_prothrombinase is "II-P2s-prothrombinase";
  species prothrombinase in compartment = 0;
  species Ixa_P9s in compartment = 0; Ixa_P9s is "Ixa-P9s*";
  species Xa_P10s_IX_P9s in compartment = 0; Xa_P10s_IX_P9s is "Xa-P10s-IX-P9s";
  species APC in compartment = 0;
  species APC_VIIIa_P8s in compartment = 0; APC_VIIIa_P8s is "APC-VIIIa-P8s";
  species VIIIa_P8s_i in compartment = 0; VIIIa_P8s_i is "VIIIa-P8s_i";
  species APC_Va_P5s in compartment = 0; APC_Va_P5s is "APC-Va-P5s";
  species Va_P5s_i in compartment = 0; Va_P5s_i is "Va-P5s_i";
  species APC_prothrombinase in compartment = 0; APC_prothrombinase is "APC-prothrombinase";
  species prothrombinase_i in compartment = 0;
  species APC_tenase in compartment = 0; APC_tenase is "APC-tenase";
  species tenase_i in compartment = 0;
  species APC_tenase_0 in compartment = 0; APC_tenase_0 is "APC-tenase*";
  species tenase__i in compartment = 0; tenase__i is "tenase*_i";
  species TFPI in compartment = 0;
  species TFPI_Xa in compartment = 0; TFPI_Xa is "TFPI-Xa";
  species TFPI_Xa_VIIa_TF in compartment = 0; TFPI_Xa_VIIa_TF is "TFPI-Xa-VIIa-TF";
  species TFPI_X_VIIa_TF in compartment = 0; TFPI_X_VIIa_TF is "TFPI-X-VIIa-TF";
  species IIa_i in compartment = 0;
  species ATIII in compartment = 0;
  species ATIII_IXa in compartment = 0; ATIII_IXa is "ATIII-IXa";
  species IXa_i in compartment = 0;
  species ATIII_Xa in compartment = 0; ATIII_Xa is "ATIII-Xa";
  species Xa_i in compartment = 0;
  species ATIII_IIa in compartment = 0; ATIII_IIa is "ATIII-IIa";
  species VIIa_TF_ATIII in compartment = 0; VIIa_TF_ATIII is "VIIa-TF-ATIII";
  species PC in compartment = 0;
  species PC_IIa in compartment = 0; PC_IIa is "PC-IIa";
  species IIa_TM in compartment = 0; IIa_TM is "IIa:TM";
  species TM in compartment = 0;
  species IIa_TM_0 in compartment = 0; IIa_TM_0 is "IIa-TM";
  species IIa_TM_PC in compartment = 0; IIa_TM_PC is "IIa-TM-PC";
  species IIa_PAR1_PL in compartment = 0; IIa_PAR1_PL is "IIa-PAR1-PL";
  species PAR1_PL in compartment = 0; PAR1_PL is "PAR1-PL";
  species IIa_PAR1_PL_Psub in compartment = 0; IIa_PAR1_PL_Psub is "IIa-PAR1-PL-Psub";
  species PAR1_PL_Psub in compartment = 0; PAR1_PL_Psub is "PAR1-PL-Psub";
  species IIa_PAR4_PL in compartment = 0; IIa_PAR4_PL is "IIa-PAR4-PL";
  species PAR4_PL in compartment = 0; PAR4_PL is "PAR4-PL";
  species IIa_PAR4_PL_Psub in compartment = 0; IIa_PAR4_PL_Psub is "IIa-PAR4-PL-Psub";
  species PAR4_PL_Psub in compartment = 0; PAR4_PL_Psub is "PAR4-PL-Psub";
  species ADP in compartment = 0;
  species APs in compartment = 0;
  species TXA2 in compartment = 0;
  species I in compartment = 0;
  species ADP_PL in compartment = 0; ADP_PL is "ADP-PL";
  species TXA2_PL in compartment = 0; TXA2_PL is "TXA2-PL";
  species ADP_PL_Psub in compartment = 0; ADP_PL_Psub is "ADP-PL-Psub";
  species TZA2_PL_Psub in compartment = 0; TZA2_PL_Psub is "TZA2-PL-Psub";
  species IIa_I in compartment = 0; IIa_I is "IIa-I";
  species Ia in compartment = 0;
  species Surface in compartment = 0;
  species XII in compartment = 0;
  species XII_Surface in compartment = 0; XII_Surface is "XII-Surface";
  species XIIa in compartment = 0;
  species PK in compartment = 0;
  species XIIa_PK in compartment = 0; XIIa_PK is "XIIa-PK";
  species K in compartment = 0;
  species XII_K in compartment = 0; XII_K is "XII-K";
  species XIIa_XII in compartment = 0; XIIa_XII is "XIIa-XII";
  species XI in compartment = 0;
  species XIIa_XI in compartment = 0; XIIa_XI is "XIIa-XI";
  species XIa in compartment = 0;
  species XIa_XI in compartment = 0; XIa_XI is "XIa-XI";
  species P11s in compartment = 0;
  species XI_P11s in compartment = 0; XI_P11s is "XI-P11s";
  species P11s_0 in compartment = 0; P11s_0 is "P11s*";
  species XIa_P11s in compartment = 0; XIa_P11s is "XIa-P11s*";
  species IIa_P2s_XI_P11s in compartment = 0; IIa_P2s_XI_P11s is "IIa-P2s-XI-P11s";
  species XIa_IX in compartment = 0; XIa_IX is "XIa-IX";
  species XIa_P11s__IX in compartment = 0; XIa_P11s__IX is "XIa-P11s*-IX";
  species PAI1 in compartment = 0;
  species tPA in compartment = 0;
  species tPA_PAI1 in compartment = 0; tPA_PAI1 is "tPA-PAI1";
  species uPA in compartment = 0;
  species uPA_PAI1 in compartment = 0; uPA_PAI1 is "uPA-PAI1";
  species PAI2 in compartment = 0;
  species tPA_PAI2 in compartment = 0; tPA_PAI2 is "tPA-PAI2";
  species uPA_PAI2 in compartment = 0; uPA_PAI2 is "uPA-PAI2";
  species PLG in compartment = 0;
  species PLG_tPA in compartment = 0; PLG_tPA is "PLG-tPA";
  species PLA in compartment = 0;
  species PLG_uPA in compartment = 0; PLG_uPA is "PLG-uPA";
  species A2AP in compartment = 0;
  species PLA_A2AP in compartment = 0; PLA_A2AP is "PLA-A2AP";
  species A2AP_inactive in compartment = 0;
  species A2M in compartment = 0;
  species PLA_A2M in compartment = 0; PLA_A2M is "PLA-A2M";
  species A2M_inactive in compartment = 0;
  species PLA__A2M in compartment = 0; PLA__A2M is "PLA--A2M";
  species FDPs in compartment = 0;
  species FDPs_PLA in compartment = 0; FDPs_PLA is "FDPs-PLA";
  species IIa_TAFI in compartment = 0; IIa_TAFI is "IIa-TAFI";
  species TAFI in compartment = 0;
  species TAFIa in compartment = 0;
  species Ia_PLA in compartment = 0; Ia_PLA is "Ia-PLA";
  species Ddimer in compartment = 0;
  species Ia_FDPs_PLA in compartment = 0; Ia_FDPs_PLA is "Ia-FDPs-PLA";
  species TAFIa_FDPs in compartment = 0; TAFIa_FDPs is "TAFIa-FDPs";
  species H5 in compartment = 0;
  species H5_ATIII in compartment = 0; H5_ATIII is "H5-ATIII";
  species H5_ATIII_Xa in compartment = 0; H5_ATIII_Xa is "H5-ATIII-Xa";
  species Xa_inactive in compartment = 0;
  species H5_ATIII_IIa in compartment = 0; H5_ATIII_IIa is "H5-ATIII-IIa";
  species IIa_inactive in compartment = 0;
  species HCII in compartment = 0;
  species HCII_IIa in compartment = 0; HCII_IIa is "HCII-IIa";
  species HCII_IIa_P2s in compartment = 0; HCII_IIa_P2s is "HCII-IIa-P2s";
  species DER in compartment = 0;
  species HCII_DER in compartment = 0; HCII_DER is "HCII-DER";
  species HCII_DER_IIa in compartment = 0; HCII_DER_IIa is "HCII-DER-IIa";
  species HCII_DER_IIa_P2s in compartment = 0; HCII_DER_IIa_P2s is "HCII-DER-IIa-P2s";
  species ARG in compartment = 0;
  species ARG_IIa in compartment = 0; ARG_IIa is "ARG-IIa";
  species ARG_IIa_P2s in compartment = 0; ARG_IIa_P2s is "ARG-IIa-P2s";
  species BIV in compartment = 0;
  species BIV_IIa in compartment = 0; BIV_IIa is "BIV-IIa";
  species BIV_inactive in compartment = 0;
  species BIV_IIa_P2s in compartment = 0; BIV_IIa_P2s is "BIV-IIa-P2s";
  species LEP in compartment = 0;
  species LEP_IIa in compartment = 0; LEP_IIa is "LEP-IIa";
  species LEP_IIa_P2s in compartment = 0; LEP_IIa_P2s is "LEP-IIa-P2s";
  species H5_ATIII_VIIa in compartment = 0; H5_ATIII_VIIa is "H5-ATIII-VIIa";
  species H5_ATIII_VIIa_TF in compartment = 0; H5_ATIII_VIIa_TF is "H5-ATIII-VIIa-TF";
  species X_VIIa in compartment = 0; X_VIIa is "X-VIIa";
  species IX_VIIa in compartment = 0; IX_VIIa is "IX-VIIa";
  species APC_PCI in compartment = 0; APC_PCI is "APC-PCI";
  species PCI in compartment = 0;
  species IIa_PCI in compartment = 0; IIa_PCI is "IIa-PCI";
  species Xa_PCI in compartment = 0; Xa_PCI is "Xa-PCI";
  species XIa_PCI in compartment = 0; XIa_PCI is "XIa-PCI";
  species uPA_PCI in compartment = 0; uPA_PCI is "uPA-PCI";
  species tPA_PCI in compartment = 0; tPA_PCI is "tPA-PCI";
  species K_PCI in compartment = 0; K_PCI is "K-PCI";

  // Parameters:
  R001_k = 0.035; R001_k is "R001_k+";
  R001_k_0 = 0.00491; R001_k_0 is "R001_k-";
  R002_k = 0.0459; R002_k is "R002_k+";
  R002_k_0 = 0.00528; R002_k_0 is "R002_k-";
  R003_k = 0.00445; R003_k is "R003_k+";
  R003_k_0 = 0.814; R003_k_0 is "R003_k-";
  R004_kc = 0.00335;
  R005_k = 0.000311; R005_k is "R005_k+";
  R005_k_0 = 0.846; R005_k_0 is "R005_k-";
  R006_kc = 0.000352;
  R007_k = 0.0935; R007_k is "R007_k+";
  R007_k_0 = 6.19; R007_k_0 is "R007_k-";
  R008_kc = 1.5;
  R009_k = 0.153; R009_k is "R009_k+";
  R009_k_0 = 2.12; R009_k_0 is "R009_k-";
  R010_kc = 0.33;
  R011_k = 0.19; R011_k is "R011_k+";
  R011_k_0 = 0.807; R011_k_0 is "R011_k-";
  R012_kc = 0.574;
  R013_k = 0.0775; R013_k is "R013_k+";
  R013_k_0 = 10.4; R013_k_0 is "R013_k-";
  R014_kc = 0.466;
  R015_k = 0.0799; R015_k is "R015_k+";
  R015_k_0 = 4.31; R015_k_0 is "R015_k-";
  R016_kc = 0.334;
  R017_k = 0.0858; R017_k is "R017_k+";
  R017_k_0 = 6.84; R017_k_0 is "R017_k-";
  R018_kc = 3.37;
  R019_k = 0.0737; R019_k is "R019_k+";
  R019_k_0 = 1.11; R019_k_0 is "R019_k-";
  R020_kc = 0.0292;
  R021_k = 0.0972; R021_k is "R021_k+";
  R021_k_0 = 1.57; R021_k_0 is "R021_k-";
  R022_kc = 0.0406;
  R023_k = 0.0977; R023_k is "R023_k+";
  R023_k_0 = 1.63; R023_k_0 is "R023_k-";
  R024_kc = 0.0218;
  R025_k = 7.7e-6; R025_k is "R025_k+";
  R025_k_0 = 1.09e-9; R025_k_0 is "R025_k-";
  R026_kc = 4.98e-6;
  R027_k = 0.00871; R027_k is "R027_k+";
  R027_k_0 = 0.0223; R027_k_0 is "R027_k-";
  R028_k = 3.27e-5; R028_k is "R028_k+";
  R028_k_0 = 0.00474; R028_k_0 is "R028_k-";
  R029_k = 2.84e-5; R029_k is "R029_k+";
  R029_k_0 = 0.00427; R029_k_0 is "R029_k-";
  R030_k = 0.0893; R030_k is "R030_k+";
  R030_k_0 = 0.0248; R030_k_0 is "R030_k-";
  R031_k = 0.079; R031_k is "R031_k+";
  R031_k_0 = 0.00809; R031_k_0 is "R031_k-";
  R032_k = 6.33; R032_k is "R032_k+";
  R032_k_0 = 0.142; R032_k_0 is "R032_k-";
  R033_k = 5.51; R033_k is "R033_k+";
  R033_k_0 = 0.11; R033_k_0 is "R033_k-";
  R034_k = 0.159; R034_k is "R034_k+";
  R034_k_0 = 0.122; R034_k_0 is "R034_k-";
  R035_k = 0.0207; R035_k is "R035_k+";
  R035_k_0 = 0.158; R035_k_0 is "R035_k-";
  R036_k = 0.00865; R036_k is "R036_k+";
  R036_k_0 = 10.6; R036_k_0 is "R036_k-";
  R037_k = 0.00034; R037_k is "R037_k+";
  R037_k_0 = 1.53; R037_k_0 is "R037_k-";
  R038_kc = 0.931;
  R039_k = 17.6; R039_k is "R039_k+";
  R039_k_0 = 0; R039_k_0 is "R039_k-";
  R040_kc = 0.163;
  R041_k = 5.14e-7; R041_k is "R041_k+";
  R041_k_0 = 1.09; R041_k_0 is "R041_k-";
  R042_kc = 5.97e-7;
  R043_k = 4.31e-7; R043_k is "R043_k+";
  R043_k_0 = 1.62; R043_k_0 is "R043_k-";
  R044_kc = 8.05e-7;
  R045_k = 0.27; R045_k is "R045_k+";
  R045_k_0 = 0.831; R045_k_0 is "R045_k-";
  R046_kc = 5.58;
  R047_k = 0.0139; R047_k is "R047_k+";
  R047_k_0 = 0.773; R047_k_0 is "R047_k-";
  R048_kc = 12.3;
  R049_k = 0.0749; R049_k is "R049_k+";
  R049_k_0 = 0.0139; R049_k_0 is "R049_k-";
  R050_kc = 20.5;
  R051_k = 0.0778; R051_k is "R051_k+";
  R051_k_0 = 0.0115; R051_k_0 is "R051_k-";
  R052_kc = 21.7;
  R053_k = 0.103; R053_k is "R053_k+";
  R053_k_0 = 1.71; R053_k_0 is "R053_k-";
  R054_kc = 0.0163;
  R055_k = 0.981; R055_k is "R055_k+";
  R055_k_0 = 12.8; R055_k_0 is "R055_k-";
  R056_kc = 0.876;
  R057_k = 0.164; R057_k is "R057_k+";
  R057_k_0 = 0.0413; R057_k_0 is "R057_k-";
  R058_kc = 12;
  R059_k = 0.0882; R059_k is "R059_k+";
  R059_k_0 = 0.28; R059_k_0 is "R059_k-";
  R060_k = 0.0916; R060_k is "R060_k+";
  R060_k_0 = 0.306; R060_k_0 is "R060_k-";
  R061_k = 1.07; R061_k is "R061_k+";
  R061_k_0 = 0.883; R061_k_0 is "R061_k-";
  R062_k = 0.000729; R062_k is "R062_k+";
  R062_k_0 = 4.05; R062_k_0 is "R062_k-";
  R063_kc = 0.0205;
  R064_k = 0.0931; R064_k is "R064_k+";
  R064_k_0 = 1.51; R064_k_0 is "R064_k-";
  R065_kc = 0.568;
  R066_k = 0.163; R066_k is "R066_k+";
  R066_k_0 = 1.31; R066_k_0 is "R066_k-";
  R067_kc = 0.346;
  R068_k = 0.0826; R068_k is "R068_k+";
  R068_k_0 = 1.19; R068_k_0 is "R068_k-";
  R069_kc = 0.378;
  R070_k = 0.132; R070_k is "R070_k+";
  R070_k_0 = 0.869; R070_k_0 is "R070_k-";
  R071_kc = 0.466;
  R072_k = 0.155; R072_k is "R072_k+";
  R072_k_0 = 0.91; R072_k_0 is "R072_k-";
  R073_kc = 0.417;
  R074_k = 0.00204; R074_k is "R074_k+";
  R074_k_0 = 0.000818; R074_k_0 is "R074_k-";
  R075_k = 0.000978; R075_k is "R075_k+";
  R075_k_0 = 0.00101; R075_k_0 is "R075_k-";
  R076_k = 0.000825; R076_k is "R076_k+";
  R076_k_0 = 0.000211; R076_k_0 is "R076_k-";
  R077_kc = 0.000476;
  R078_k = 7.12e-7; R078_k is "R078_k+";
  R078_k_0 = 8.45e-10; R078_k_0 is "R078_k-";
  R079_kc = 3.71e-7;
  R080_k = 0.000152; R080_k is "R080_k+";
  R080_k_0 = 6.58e-10; R080_k_0 is "R080_k-";
  R081_kc = 3.76e-5;
  R082_k = 2.27e-6; R082_k is "R082_k+";
  R082_k_0 = 1e-9; R082_k_0 is "R082_k-";
  R083_kc = 2.9e-5;
  R084_k = 2.34e-7; R084_k is "R084_k+";
  R084_k_0 = 8.14e-10; R084_k_0 is "R084_k-";
  R085_k = 5.7e-7; R085_k is "R085_k+";
  R085_k_0 = 1.6e-9; R085_k_0 is "R085_k-";
  R086_kc = 0.00031;
  R087_k = 0.027; R087_k is "R087_k+";
  R087_k_0 = 0.0856; R087_k_0 is "R087_k-";
  R088_k = 0.000908; R088_k is "R088_k+";
  R088_k_0 = 0.331; R088_k_0 is "R088_k-";
  R089_kc = 30.8;
  R090_k = 0.615; R090_k is "R090_k+";
  R090_k_0 = 8.51; R090_k_0 is "R090_k-";
  R091_k = 0.148; R091_k is "R091_k+";
  R091_k_0 = 3.68; R091_k_0 is "R091_k-";
  R092_kc = 0.0171;
  R093_kc = 0.0362;
  R094_k = 0.187; R094_k is "R094_k+";
  R094_k_0 = 4.39; R094_k_0 is "R094_k-";
  R095_k = 0.597; R095_k is "R095_k+";
  R095_k_0 = 1.97; R095_k_0 is "R095_k-";
  R096_kc = 0.0275;
  R097_kc = 1.81;
  R098_kc = 1.39e-6;
  R099_kc = 1.1e-6;
  R100_kc = 8.49e-7;
  R101_kc = 0.00133;
  R102_kc = 0.00294;
  R103_kc = 0.000788;
  R104_k = 2.68e-7; R104_k is "R104_k+";
  R104_k_0 = 0.745; R104_k_0 is "R104_k-";
  R105_kc = 1.95e-7;
  R106_k = 0.311; R106_k is "R106_k+";
  R106_k_0 = 1.53; R106_k_0 is "R106_k-";
  R107_kc = 0.022;
  R108_k = 0.0275; R108_k is "R108_k+";
  R108_k_0 = 0.00716; R108_k_0 is "R108_k-";
  R109_kc = 0.00249;
  R110_k = 0.123; R110_k is "R110_k+";
  R110_k_0 = 0.628; R110_k_0 is "R110_k-";
  R111_kc = 0.0195;
  R112_k = 0.0166; R112_k is "R112_k+";
  R112_k_0 = 1.06; R112_k_0 is "R112_k-";
  R113_kc = 0.00406;
  R114_k = 0.112; R114_k is "R114_k+";
  R114_k_0 = 0.119; R114_k_0 is "R114_k-";
  R115_kc = 0.114;
  R116_k = 0.107; R116_k is "R116_k+";
  R116_k_0 = 0.0963; R116_k_0 is "R116_k-";
  R117_kc = 0.211;
  R118_k = 0.0956; R118_k is "R118_k+";
  R118_k_0 = 0.093; R118_k_0 is "R118_k-";
  R119_kc = 0.0852;
  R120_k = 0.0763; R120_k is "R120_k+";
  R120_k_0 = 0.3; R120_k_0 is "R120_k-";
  R121_kc = 0.131;
  R122_k = 0.0031; R122_k is "R122_k+";
  R122_k_0 = 0.118; R122_k_0 is "R122_k-";
  R123_kc = 0.362;
  R124_k = 0.00164; R124_k is "R124_k+";
  R124_k_0 = 0.0802; R124_k_0 is "R124_k-";
  R125_kc = 0.127;
  R126_k = 0.0701; R126_k is "R126_k+";
  R126_k_0 = 0.662; R126_k_0 is "R126_k-";
  R127_k = 0.159; R127_k is "R127_k+";
  R127_k_0 = 0.077; R127_k_0 is "R127_k-";
  R128_k = 0.00969; R128_k is "R128_k+";
  R128_k_0 = 0.276; R128_k_0 is "R128_k-";
  R129_kc = 1.63;
  R130_k = 0.0123; R130_k is "R130_k+";
  R130_k_0 = 0.0739; R130_k_0 is "R130_k-";
  R131_kc = 8.19;
  R132_k = 0.0128; R132_k is "R132_k+";
  R132_k_0 = 0.138; R132_k_0 is "R132_k-";
  R133_kc = 11.1;
  R134_k = 0.0162; R134_k is "R134_k+";
  R134_k_0 = 0.00883; R134_k_0 is "R134_k-";
  R135_k = 0.0216; R135_k is "R135_k+";
  R135_k_0 = 0.00143; R135_k_0 is "R135_k-";
  R136_k = 0.000123; R136_k is "R136_k+";
  R136_k_0 = 1.34e-6; R136_k_0 is "R136_k-";
  R137_k = 0.00146; R137_k is "R137_k+";
  R137_k_0 = 7.5e-6; R137_k_0 is "R137_k-";
  R138_k = 0.0143; R138_k is "R138_k+";
  R138_k_0 = 0.0746; R138_k_0 is "R138_k-";
  R139_kc = 2.08;
  R140_k = 0.00405; R140_k is "R140_k+";
  R140_k_0 = 0.117; R140_k_0 is "R140_k-";
  R141_kc = 53.7;
  R142_k = 0.0354; R142_k is "R142_k+";
  R142_k_0 = 0.00663; R142_k_0 is "R142_k-";
  R143_kc = 0.00484;
  R144_k = 0.000558; R144_k is "R144_k+";
  R144_k_0 = 1.11e-5; R144_k_0 is "R144_k-";
  R145_kc = 1.05e-5;
  R146_k = 0.00862; R146_k is "R146_k+";
  R146_k_0 = 0.0852; R146_k_0 is "R146_k-";
  R147_k = 0.000892; R147_k is "R147_k+";
  R147_k_0 = 0.0874; R147_k_0 is "R147_k-";
  R148_kc = 579;
  R149_k = 6.26e-5; R149_k is "R149_k+";
  R149_k_0 = 0.171; R149_k_0 is "R149_k-";
  R150_kc = 0.000239;
  R151_k = 4.98e-5; R151_k is "R151_k+";
  R151_k_0 = 0.117; R151_k_0 is "R151_k-";
  R152_kc = 0.00106;
  R153_k = 84; R153_k is "R153_k+";
  R153_k_0 = 0.000104; R153_k_0 is "R153_k-";
  R154_k = 0.0335; R154_k is "R154_k+";
  R154_k_0 = 0.883; R154_k_0 is "R154_k-";
  R155_k = 0.0202; R155_k is "R155_k+";
  R155_k_0 = 7.26e-10; R155_k_0 is "R155_k-";
  R156_kc = 0.000527;
  R157_k = 1.7e-5; R157_k is "R157_k+";
  R157_k_0 = 1.65e-9; R157_k_0 is "R157_k-";
  R158_kc = 4.96e-6;
  R159_k = 2.77e-7; R159_k is "R159_k+";
  R159_k_0 = 7.12e-10; R159_k_0 is "R159_k-";
  R160_k = 7.63e-7; R160_k is "R160_k+";
  R160_k_0 = 1.46e-9; R160_k_0 is "R160_k-";
  R161_k = 0.914; R161_k is "R161_k+";
  R161_k_0 = 1.04e-9; R161_k_0 is "R161_k-";
  R162_k = 0.0276; R162_k is "R162_k+";
  R162_k_0 = 7.06e-10; R162_k_0 is "R162_k-";
  R163_k = 0.0346; R163_k is "R163_k+";
  R163_k_0 = 7.72e-10; R163_k_0 is "R163_k-";
  R164_k = 0.0291; R164_k is "R164_k+";
  R164_k_0 = 0.265; R164_k_0 is "R164_k-";
  R165_k = 0.0787; R165_k is "R165_k+";
  R165_k_0 = 0.314; R165_k_0 is "R165_k-";
  R166_k = 0.647; R166_k is "R166_k+";
  R166_k_0 = 0.559; R166_k_0 is "R166_k-";
  R167_kc = 0.0189;
  R168_k = 0.507; R168_k is "R168_k+";
  R168_k_0 = 0.708; R168_k_0 is "R168_k-";
  R169_kc = 0.00749;
  R170_k = 0.357; R170_k is "R170_k+";
  R170_k_0 = 1.2e-5; R170_k_0 is "R170_k-";
  R171_k = 0.328; R171_k is "R171_k+";
  R171_k_0 = 1.5e-5; R171_k_0 is "R171_k-";
  R172_k = 2.06e-7; R172_k is "R172_k+";
  R172_k_0 = 3.2e-9; R172_k_0 is "R172_k-";
  R173_k = 2.36e-6; R173_k is "R173_k+";
  R173_k_0 = 7.37e-10; R173_k_0 is "R173_k-";
  R174_k = 3.33e-5; R174_k is "R174_k+";
  R174_k_0 = 0.0952; R174_k_0 is "R174_k-";
  R175_kc = 7.01e-5;
  R176_k = 5.79e-5; R176_k is "R176_k+";
  R176_k_0 = 0.167; R176_k_0 is "R176_k-";
  R177_kc = 1.44e-5;
  R178_k = 5.2e-6; R178_k is "R178_k+";
  R178_k_0 = 2.19e-9; R178_k_0 is "R178_k-";
  R179_k = 5.5e-6; R179_k is "R179_k+";
  R179_k_0 = 1.84e-9; R179_k_0 is "R179_k-";
  R180_k = 1.81e-5; R180_k is "R180_k+";
  R180_k_0 = 7.49e-10; R180_k_0 is "R180_k-";
  R181_k = 0.000123; R181_k is "R181_k+";
  R181_k_0 = 1.58e-9; R181_k_0 is "R181_k-";
  R182_k = 1.62e-6; R182_k is "R182_k+";
  R182_k_0 = 1.99e-9; R182_k_0 is "R182_k-";
  R183_k = 6.29e-7; R183_k is "R183_k+";
  R183_k_0 = 9.13e-10; R183_k_0 is "R183_k-";
  R184_k = 7.06e-5; R184_k is "R184_k+";
  R184_k_0 = 1.1e-9; R184_k_0 is "R184_k-";

  // Reactions:
  R001: VII + TF -> VII_TF; compartment*(R001_k*VII*TF - R001_k_0*VII_TF);
  R002: VIIa + TF -> Viia_TF; compartment*(R002_k*VIIa*TF - R002_k_0*Viia_TF);
  R003: Xa + VII_TF -> Xa_VII_TF; compartment*(R003_k*Xa*VII_TF - R003_k_0*Xa_VII_TF);
  R004: Xa_VII_TF => VIIa_TF + Xa; compartment*R004_kc*Xa_VII_TF;
  R005: IIa + VII_TF -> IIa_VII_TF; compartment*(R005_k*IIa*VII_TF - R005_k_0*IIa_VII_TF);
  R006: IIa_VII_TF => VIIa_TF + IIa; compartment*R006_kc*IIa_VII_TF;
  // Reaction changed from publication: Factor X is activated by VIIa:TF, not VII-TF.
  // Rao, L. V. M. and Rapaport, S. I. (1988). Activation of factor VII bound to tissue factor: a key early step in the tissue factor pathway of blood coagulation. Proc Natl Acad Sci U S A. 1988 Sep; 85(18): 6687–6691.
  // Pubmed: 3261869
  // "...factor VII can activate its substrates, factor IX and factor X, only when bound to TF as a factor VIIa/TF enzyme/cofactor complex."
  R007: X + VIIa_TF -> X_VIIa_TF; compartment*(R007_k*X*VIIa_TF - R007_k_0*X_VIIa_TF);
  // Reaction changed from publication: Factor X is activated by VIIa:TF, not VII-TF.
  // Rao, L. V. M. and Rapaport, S. I. (1988). Activation of factor VII bound to tissue factor: a key early step in the tissue factor pathway of blood coagulation. Proc Natl Acad Sci U S A. 1988 Sep; 85(18): 6687–6691.
  // Pubmed: 3261869
  // "...factor VII can activate its substrates, factor IX and factor X, only when bound to TF as a factor VIIa/TF enzyme/cofactor complex."
  R008: X_VIIa_TF => VIIa_TF + Xa; compartment*R008_kc*X_VIIa_TF;
  R009: IX + VIIa_TF -> IX_VIIa_TF; compartment*(R009_k*IX*VIIa_TF - R009_k_0*IX_VIIa_TF);
  // Typo in publication: substrate listed as IX-VII-TF
  R010: IX_VIIa_TF => VIIa_TF + IXa; compartment*R010_kc*IX_VIIa_TF;
  R011: VII + Xa -> VII_Xa; compartment*(R011_k*VII*Xa - R011_k_0*VII_Xa);
  R012: VII_Xa => VIIa + Xa; compartment*R012_kc*VII_Xa;
  R013: VII + IIa -> VII_IIa; compartment*(R013_k*VII*IIa - R013_k_0*VII_IIa);
  R014: VII_IIa => VIIa + IIa; compartment*R014_kc*VII_IIa;
  R015: V + IIa -> V_IIa; compartment*(R015_k*V*IIa - R015_k_0*V_IIa);
  R016: V_IIa => Va + IIa; compartment*R016_kc*V_IIa;
  R017: VIII + IIa -> VIII_IIa; compartment*(R017_k*VIII*IIa - R017_k_0*VIII_IIa);
  R018: VIII_IIa => VIIIa + IIa; compartment*R018_kc*VIII_IIa;
  R019: Xa + IX -> Xa_IX; compartment*(R019_k*Xa*IX - R019_k_0*Xa_IX);
  R020: Xa_IX => Xa + IXa; compartment*R020_kc*Xa_IX;
  R021: Xa + V -> Xa_V; compartment*(R021_k*Xa*V - R021_k_0*Xa_V);
  R022: Xa_V => Xa + Va; compartment*R022_kc*Xa_V;
  R023: Xa + VIII -> Xa_VIII; compartment*(R023_k*Xa*VIII - R023_k_0*Xa_VIII);
  R024: Xa_VIII => Xa + VIIIa; compartment*R024_kc*Xa_VIII;
  R025: Xa + II -> Xa_II; compartment*(R025_k*Xa*II - R025_k_0*Xa_II);
  R026: Xa_II => Xa + IIa; compartment*R026_kc*Xa_II;
  R027: IX + P9s -> IX_P9s; compartment*(R027_k*IX*P9s - R027_k_0*IX_P9s);
  R028: IXa + P9s -> IXa_P9s; compartment*(R028_k*IXa*P9s - R028_k_0*IXa_P9s);
  R029: IXa + P9s_0 -> IXa_P9s_0; compartment*(R029_k*IXa*P9s_0 - R029_k_0*IXa_P9s_0);
  R030: X + P10s -> X_P10s; compartment*(R030_k*X*P10s - R030_k_0*X_P10s);
  R031: Xa + P10s -> Xa_P10s; compartment*(R031_k*Xa*P10s - R031_k_0*Xa_P10s);
  R032: V + P5s -> V_P5s; compartment*(R032_k*V*P5s - R032_k_0*V_P5s);
  R033: Va + P5s -> Va_P5s; compartment*(R033_k*Va*P5s - R033_k_0*Va_P5s);
  R034: VIII + P8s -> VIII_P8s; compartment*(R034_k*VIII*P8s - R034_k_0*VIII_P8s);
  R035: VIIIa + P8s -> VIIIa_P8s; compartment*(R035_k*VIIIa*P8s - R035_k_0*VIIIa_P8s);
  R036: II + P2s -> II_P2s; compartment*(R036_k*II*P2s - R036_k_0*II_P2s);
  R037: IIa + P2s -> IIa_P2s; compartment*(R037_k*IIa*P2s - R037_k_0*IIa_P2s);
  R038: PL + Psub => AP_Psub; compartment*R038_kc*PL*Psub;
  R039: PL + Psub => PL_Psub; compartment*R039_k*PL*Psub;
  R040: AP + Psub => AP_Psub; compartment*R040_kc*AP*Psub;
  R041: PL + AP -> PL_AP; compartment*(R041_k*PL*AP - R041_k_0*PL_AP);
  // Reaction listed as being reversible in publication.
  R042: PL_AP => 2 AP; compartment*R042_kc*PL_AP;
  R043: PL + AP_Psub -> PL_AP_Psub; compartment*(R043_k*PL*AP_Psub - R043_k_0*PL_AP_Psub);
  R044: PL_AP_Psub => AP + AP_Psub; compartment*R044_kc*PL_AP_Psub;
  R045: V_P5s + Xa_P10s -> V_P5s_Xa_P10s; compartment*(R045_k*V_P5s*Xa_P10s - R045_k_0*V_P5s_Xa_P10s);
  R046: V_P5s_Xa_P10s => Va_P5s + Xa_P10s; compartment*R046_kc*V_P5s_Xa_P10s;
  R047: V_P5s + IIa_P2s -> V_P5s_IIa_P2s; compartment*(R047_k*V_P5s*IIa_P2s - R047_k_0*V_P5s_IIa_P2s);
  // Typo? Publication lists substrates as V-P5s-IIa-P10s, instead of V-P5s-IIa-P2s.
  R048: V_P5s_IIa_P2s => Va_P5s + IIa_P2s; compartment*R048_kc*V_P5s_IIa_P2s;
  R049: X_P10s + tenase -> X_P10s_tenase; compartment*(R049_k*X_P10s*tenase - R049_k_0*X_P10s_tenase);
  R050: X_P10s_tenase => Xa_P10s + tenase; compartment*R050_kc*X_P10s_tenase;
  R051: X_P10s + tenase_0 -> X_P10s_tenase_0; compartment*(R051_k*X_P10s*tenase_0 - R051_k_0*X_P10s_tenase_0);
  R052: X_P10s_tenase_0 => Xa_P10s + tenase_0; compartment*R052_kc*X_P10s_tenase_0;
  R053: VIII_P8s + Xa_P10s -> VIII_P8s_Xa_P10s; compartment*(R053_k*VIII_P8s*Xa_P10s - R053_k_0*VIII_P8s_Xa_P10s);
  R054: VIII_P8s_Xa_P10s => VIIIa_P8s + Xa_P10s; compartment*R054_kc*VIII_P8s_Xa_P10s;
  R055: VIII_P8s + IIa_P2s -> VIII_P8s_IIa_P2s; compartment*(R055_k*VIII_P8s*IIa_P2s - R055_k_0*VIII_P8s_IIa_P2s);
  // Typo? Publication lists substrates as VIII-P8s-IIa-P10s, instead of VIII-P8s-IIa-P2s
  R056: VIII_P8s_IIa_P2s => VIIIa_P8s + IIa_P2s; compartment*R056_kc*VIII_P8s_IIa_P2s;
  R057: II_P2s + prothrombinase -> II_P2s_prothrombinase; compartment*(R057_k*II_P2s*prothrombinase - R057_k_0*II_P2s_prothrombinase);
  R058: II_P2s_prothrombinase => IIa_P2s + prothrombinase; compartment*R058_kc*II_P2s_prothrombinase;
  R059: VIIIa_P8s + IXa_P9s -> tenase; compartment*(R059_k*VIIIa_P8s*IXa_P9s - R059_k_0*tenase);
  R060: VIIIa_P8s + Ixa_P9s -> tenase_0; compartment*(R060_k*VIIIa_P8s*Ixa_P9s - R060_k_0*tenase_0);
  R061: Va_P5s + Xa_P10s -> prothrombinase; compartment*(R061_k*Va_P5s*Xa_P10s - R061_k_0*prothrombinase);
  R062: Xa_P10s + IX_P9s -> Xa_P10s_IX_P9s; compartment*(R062_k*Xa_P10s*IX_P9s - R062_k_0*Xa_P10s_IX_P9s);
  R063: Xa_P10s_IX_P9s => Xa_P10s + IXa_P9s; compartment*R063_kc*Xa_P10s_IX_P9s;
  R064: APC + VIIIa_P8s -> APC_VIIIa_P8s; compartment*(R064_k*APC*VIIIa_P8s - R064_k_0*APC_VIIIa_P8s);
  R065: APC_VIIIa_P8s => APC + VIIIa_P8s_i; compartment*R065_kc*APC_VIIIa_P8s;
  // Typo? Publication lists the substrate as being Va-P8s, instead of Va-P5s
  R066: APC + Va_P5s -> APC_Va_P5s; compartment*(R066_k*APC*Va_P5s - R066_k_0*APC_Va_P5s);
  // Typo? Publication lists the substrate as being APC-Va-P8s, instead of APC-Va-P5s
  R067: APC_Va_P5s => APC + Va_P5s_i; compartment*R067_kc*APC_Va_P5s;
  R068: APC + prothrombinase -> APC_prothrombinase; compartment*(R068_k*APC*prothrombinase - R068_k_0*APC_prothrombinase);
  R069: APC_prothrombinase => APC + prothrombinase_i; compartment*R069_kc*APC_prothrombinase;
  R070: APC + tenase -> APC_tenase; compartment*(R070_k*APC*tenase - R070_k_0*APC_tenase);
  R071: APC_tenase => APC + tenase_i; compartment*R071_kc*APC_tenase;
  R072: APC + tenase_0 -> APC_tenase_0; compartment*(R072_k*APC*tenase_0 - R072_k_0*APC_tenase_0);
  R073: APC_tenase_0 => APC + tenase__i; compartment*R073_kc*APC_tenase_0;
  R074: TFPI + Xa -> TFPI_Xa; compartment*(R074_k*TFPI*Xa - R074_k_0*TFPI_Xa);
  R075: TFPI_Xa + VIIa_TF -> TFPI_Xa_VIIa_TF; compartment*(R075_k*TFPI_Xa*VIIa_TF - R075_k_0*TFPI_Xa_VIIa_TF);
  R076: TFPI + X_VIIa_TF -> TFPI_X_VIIa_TF; compartment*(R076_k*TFPI*X_VIIa_TF - R076_k_0*TFPI_X_VIIa_TF);
  R077: IIa => IIa_i; compartment*R077_kc*IIa;
  R078: ATIII + IXa -> ATIII_IXa; compartment*(R078_k*ATIII*IXa - R078_k_0*ATIII_IXa);
  R079: ATIII_IXa => ATIII + IXa_i; compartment*R079_kc*ATIII_IXa;
  R080: ATIII + Xa -> ATIII_Xa; compartment*(R080_k*ATIII*Xa - R080_k_0*ATIII_Xa);
  R081: ATIII_Xa => ATIII + Xa_i; compartment*R081_kc*ATIII_Xa;
  R082: ATIII + IIa -> ATIII_IIa; compartment*(R082_k*ATIII*IIa - R082_k_0*ATIII_IIa);
  R083: ATIII_IIa => ATIII + IIa_i; compartment*R083_kc*ATIII_IIa;
  // Typo. Publication lists product as being VIIIa:TF:ATIII instead of VIIa:TF:ATIII
  R084: ATIII + VIIa_TF -> VIIa_TF_ATIII; compartment*(R084_k*ATIII*VIIa_TF - R084_k_0*VIIa_TF_ATIII);
  R085: PC + IIa -> PC_IIa; compartment*(R085_k*PC*IIa - R085_k_0*PC_IIa);
  R086: PC_IIa => APC + IIa; compartment*R086_kc*PC_IIa;
  R087: IIa + TM -> IIa_TM; compartment*(R087_k*IIa*TM - R087_k_0*IIa_TM);
  R088: IIa_TM_0 + PC -> IIa_TM_PC; compartment*(R088_k*IIa_TM_0*PC - R088_k_0*IIa_TM_PC);
  R089: IIa_TM_PC => IIa_TM_0 + APC; compartment*R089_kc*IIa_TM_PC;
  R090: IIa + PAR1_PL -> IIa_PAR1_PL; compartment*(R090_k*IIa*PAR1_PL - R090_k_0*IIa_PAR1_PL);
  R091: IIa + PAR1_PL_Psub -> IIa_PAR1_PL_Psub; compartment*(R091_k*IIa*PAR1_PL_Psub - R091_k_0*IIa_PAR1_PL_Psub);
  R092: IIa_PAR1_PL => AP + IIa; compartment*R092_kc*IIa_PAR1_PL;
  R093: IIa_PAR1_PL_Psub => AP_Psub + IIa; compartment*R093_kc*IIa_PAR1_PL_Psub;
  R094: IIa + PAR4_PL -> IIa_PAR4_PL; compartment*(R094_k*IIa*PAR4_PL - R094_k_0*IIa_PAR4_PL);
  R095: IIa + PAR4_PL_Psub -> IIa_PAR4_PL_Psub; compartment*(R095_k*IIa*PAR4_PL_Psub - R095_k_0*IIa_PAR4_PL_Psub);
  R096: IIa_PAR4_PL => AP + IIa; compartment*R096_kc*IIa_PAR4_PL;
  R097: IIa_PAR4_PL_Psub => AP_Psub + IIa; compartment*R097_kc*IIa_PAR4_PL_Psub;
  R098: AP => APs + ADP; compartment*R098_kc*AP;
  R099: AP => APs + TXA2; compartment*R099_kc*AP;
  R100: AP => APs + I; compartment*R100_kc*AP;
  R101: AP_Psub => APs + ADP; compartment*R101_kc*AP_Psub;
  R102: AP_Psub => APs + TXA2; compartment*R102_kc*AP_Psub;
  R103: AP_Psub => APs + I; compartment*R103_kc*AP_Psub;
  R104: ADP + PL -> ADP_PL; compartment*(R104_k*ADP*PL - R104_k_0*ADP_PL);
  R105: ADP_PL => AP + ADP; compartment*R105_kc*ADP_PL;
  R106: TXA2 + PL -> TXA2_PL; compartment*(R106_k*TXA2*PL - R106_k_0*TXA2_PL);
  R107: TXA2_PL => AP + TXA2; compartment*R107_kc*TXA2_PL;
  R108: ADP + PL_Psub -> ADP_PL_Psub; compartment*(R108_k*ADP*PL_Psub - R108_k_0*ADP_PL_Psub);
  R109: ADP_PL_Psub => AP_Psub + ADP; compartment*R109_kc*ADP_PL_Psub;
  R110: TXA2 + PL_Psub -> TZA2_PL_Psub; compartment*(R110_k*TXA2*PL_Psub - R110_k_0*TZA2_PL_Psub);
  R111: TZA2_PL_Psub => AP_Psub + TXA2; compartment*R111_kc*TZA2_PL_Psub;
  R112: IIa + I -> IIa_I; compartment*(R112_k*IIa*I - R112_k_0*IIa_I);
  R113: IIa_I => IIa + Ia; compartment*R113_kc*IIa_I;
  R114: XII + Surface -> XII_Surface; compartment*(R114_k*XII*Surface - R114_k_0*XII_Surface);
  R115: XII_Surface => XIIa + Surface; compartment*R115_kc*XII_Surface;
  R116: XIIa + PK -> XIIa_PK; compartment*(R116_k*XIIa*PK - R116_k_0*XIIa_PK);
  R117: XIIa_PK => XIIa + K; compartment*R117_kc*XIIa_PK;
  R118: XII + K -> XII_K; compartment*(R118_k*XII*K - R118_k_0*XII_K);
  R119: XII_K => XIIa + K; compartment*R119_kc*XII_K;
  R120: XIIa + XII -> XIIa_XII; compartment*(R120_k*XIIa*XII - R120_k_0*XIIa_XII);
  R121: XIIa_XII => 2 XIIa; compartment*R121_kc*XIIa_XII;
  R122: XIIa + XI -> XIIa_XI; compartment*(R122_k*XIIa*XI - R122_k_0*XIIa_XI);
  R123: XIIa_XI => XIIa + XIa; compartment*R123_kc*XIIa_XI;
  R124: XIa + XI -> XIa_XI; compartment*(R124_k*XIa*XI - R124_k_0*XIa_XI);
  R125: XIa_XI => 2 XIa; compartment*R125_kc*XIa_XI;
  R126: XI + P11s -> XI_P11s; compartment*(R126_k*XI*P11s - R126_k_0*XI_P11s);
  R127: XIa + P11s_0 -> XIa_P11s; compartment*(R127_k*XIa*P11s_0 - R127_k_0*XIa_P11s);
  R128: IIa_P2s + XI_P11s -> IIa_P2s_XI_P11s; compartment*(R128_k*IIa_P2s*XI_P11s - R128_k_0*IIa_P2s_XI_P11s);
  R129: IIa_P2s_XI_P11s => IIa_P2s + XIa_P11s; compartment*R129_kc*IIa_P2s_XI_P11s;
  R130: XIa + IX -> XIa_IX; compartment*(R130_k*XIa*IX - R130_k_0*XIa_IX);
  R131: XIa_IX => XIa + IXa; compartment*R131_kc*XIa_IX;
  R132: XIa_P11s + IX -> XIa_P11s__IX; compartment*(R132_k*XIa_P11s*IX - R132_k_0*XIa_P11s__IX);
  R133: XIa_P11s__IX => XIa_P11s + IXa; compartment*R133_kc*XIa_P11s__IX;
  R134: tPA + PAI1 -> tPA_PAI1; compartment*(R134_k*tPA*PAI1 - R134_k_0*tPA_PAI1);
  R135: uPA + PAI1 -> uPA_PAI1; compartment*(R135_k*uPA*PAI1 - R135_k_0*uPA_PAI1);
  R136: tPA + PAI2 -> tPA_PAI2; compartment*(R136_k*tPA*PAI2 - R136_k_0*tPA_PAI2);
  R137: uPA + PAI2 -> uPA_PAI2; compartment*(R137_k*uPA*PAI2 - R137_k_0*uPA_PAI2);
  R138: PLG + tPA -> PLG_tPA; compartment*(R138_k*PLG*tPA - R138_k_0*PLG_tPA);
  R139: PLG_tPA => PLA + tPA; compartment*R139_kc*PLG_tPA;
  R140: PLG + uPA -> PLG_uPA; compartment*(R140_k*PLG*uPA - R140_k_0*PLG_uPA);
  R141: PLG_uPA => PLA + uPA; compartment*R141_kc*PLG_uPA;
  R142: PLA + A2AP -> PLA_A2AP; compartment*(R142_k*PLA*A2AP - R142_k_0*PLA_A2AP);
  R143: PLA_A2AP => PLA + A2AP_inactive; compartment*R143_kc*PLA_A2AP;
  R144: PLA + A2M -> PLA_A2M; compartment*(R144_k*PLA*A2M - R144_k_0*PLA_A2M);
  R145: PLA__A2M => PLA + A2M_inactive; compartment*R145_kc*PLA__A2M;
  R146: FDPs + PLA -> FDPs_PLA; compartment*(R146_k*FDPs*PLA - R146_k_0*FDPs_PLA);
  R147: IIa + TAFI -> IIa_TAFI; compartment*(R147_k*IIa*TAFI - R147_k_0*IIa_TAFI);
  R148: IIa_TAFI => IIa + TAFIa; compartment*R148_kc*IIa_TAFI;
  R149: Ia + PLA -> Ia_PLA; compartment*(R149_k*Ia*PLA - R149_k_0*Ia_PLA);
  R150: Ia_PLA => Ddimer + FDPs + PLA; compartment*R150_kc*Ia_PLA;
  R151: Ia + FDPs_PLA -> Ia_FDPs_PLA; compartment*(R151_k*Ia*FDPs_PLA - R151_k_0*Ia_FDPs_PLA);
  R152: Ia_FDPs_PLA => Ddimer + FDPs + FDPs_PLA; compartment*R152_kc*Ia_FDPs_PLA;
  R153: TAFIa + FDPs -> TAFIa_FDPs; compartment*(R153_k*TAFIa*FDPs - R153_k_0*TAFIa_FDPs);
  R154: H5 + ATIII -> H5_ATIII; compartment*(R154_k*H5*ATIII - R154_k_0*H5_ATIII);
  R155: H5_ATIII + Xa -> H5_ATIII_Xa; compartment*(R155_k*H5_ATIII*Xa - R155_k_0*H5_ATIII_Xa);
  R156: H5_ATIII_Xa => H5_ATIII + Xa_inactive; compartment*R156_kc*H5_ATIII_Xa;
  R157: H5_ATIII + IIa -> H5_ATIII_IIa; compartment*(R157_k*H5_ATIII*IIa - R157_k_0*H5_ATIII_IIa);
  R158: H5_ATIII_IIa => H5_ATIII + IIa_inactive; compartment*R158_kc*H5_ATIII_IIa;
  R159: HCII + IIa -> HCII_IIa; compartment*(R159_k*HCII*IIa - R159_k_0*HCII_IIa);
  R160: HCII + IIa_P2s -> HCII_IIa_P2s; compartment*(R160_k*HCII*IIa_P2s - R160_k_0*HCII_IIa_P2s);
  R161: HCII + DER -> HCII_DER; compartment*(R161_k*HCII*DER - R161_k_0*HCII_DER);
  R162: HCII_DER + IIa -> HCII_DER_IIa; compartment*(R162_k*HCII_DER*IIa - R162_k_0*HCII_DER_IIa);
  R163: HCII_DER + IIa_P2s -> HCII_DER_IIa_P2s; compartment*(R163_k*HCII_DER*IIa_P2s - R163_k_0*HCII_DER_IIa_P2s);
  R164: ARG + IIa -> ARG_IIa; compartment*(R164_k*ARG*IIa - R164_k_0*ARG_IIa);
  R165: ARG + IIa_P2s -> ARG_IIa_P2s; compartment*(R165_k*ARG*IIa_P2s - R165_k_0*ARG_IIa_P2s);
  R166: BIV + IIa -> BIV_IIa; compartment*(R166_k*BIV*IIa - R166_k_0*BIV_IIa);
  R167: BIV_IIa => BIV_inactive + IIa; compartment*R167_kc*BIV_IIa;
  R168: BIV + IIa_P2s -> BIV_IIa_P2s; compartment*(R168_k*BIV*IIa_P2s - R168_k_0*BIV_IIa_P2s);
  R169: BIV_IIa_P2s => BIV_inactive + IIa_P2s; compartment*R169_kc*BIV_IIa_P2s;
  R170: LEP + IIa -> LEP_IIa; compartment*(R170_k*LEP*IIa - R170_k_0*LEP_IIa);
  R171: LEP + IIa_P2s -> LEP_IIa_P2s; compartment*(R171_k*LEP*IIa_P2s - R171_k_0*LEP_IIa_P2s);
  R172: H5_ATIII + VIIa -> H5_ATIII_VIIa; compartment*(R172_k*H5_ATIII*VIIa - R172_k_0*H5_ATIII_VIIa);
  R173: H5_ATIII + VIIa_TF -> H5_ATIII_VIIa_TF; compartment*(R173_k*H5_ATIII*VIIa_TF - R173_k_0*H5_ATIII_VIIa_TF);
  R174: X + VIIa -> X_VIIa; compartment*(R174_k*X*VIIa - R174_k_0*X_VIIa);
  R175: X_VIIa => Xa + VIIa; compartment*R175_kc*X_VIIa;
  R176: IX + VIIa -> IX_VIIa; compartment*(R176_k*IX*VIIa - R176_k_0*IX_VIIa);
  R177: IX_VIIa => IXa + VIIa; compartment*R177_kc*IX_VIIa;
  R178: APC + PCI -> APC_PCI; compartment*(R178_k*APC*PCI - R178_k_0*APC_PCI);
  R179: IIa + PCI -> IIa_PCI; compartment*(R179_k*IIa*PCI - R179_k_0*IIa_PCI);
  R180: Xa + PCI -> Xa_PCI; compartment*(R180_k*Xa*PCI - R180_k_0*Xa_PCI);
  R181: XIa + PCI -> XIa_PCI; compartment*(R181_k*XIa*PCI - R181_k_0*XIa_PCI);
  R182: uPA + PCI -> uPA_PCI; compartment*(R182_k*uPA*PCI - R182_k_0*uPA_PCI);
  R183: tPA + PCI -> tPA_PCI; compartment*(R183_k*tPA*PCI - R183_k_0*tPA_PCI);
  R184: K + PCI -> K_PCI; compartment*(R184_k*K*PCI - R184_k_0*K_PCI);

  // Unit definitions:
  unit volume = 1e-3 litre;
  unit substance = 1e-3 mole;
end
