// SBML level 2 version 4
// dcterms:bibliographicCitation: A model of beta-cell mass, insulin, and glucose kinetics: pathways to diabetes. urn:miriam:pubmed:11013117

function Function_for_clearance_of_insulin_from_the_system(k, I)
  k*I;
end

function Function_for_removal_of_beta_cell(d_0, r2, G, beta)
  (d_0 + r2*G*G)*beta;
end

function Function_for_formation_of_glucose(R_0)
  R_0;
end

function Function_for_removal_of_glucose_from_the_system(E_go, Si, I, G)
  (E_go + Si*I)*G;
end

function Function_for_secretion_of_insulin(beta, alpha, G, delta)
  beta*delta*G*G/(alpha + G*G);
end

function Function_for_formation_of_beta_cell(r1, G, beta)
  r1*G*beta;
end

model Topp200____Model_of_b_Cell_Mass__Insulin__and_Glucose_Kinetics_Pathways_to_Diabetes()
  // Topp200 - Model of b-Cell Mass, Insulin, and Glucose Kinetics:Pathways to Diabetes
  // A Model of β -Cell Mass, Insulin, and Glucose Kinetics: Pathways to Diabetes
  // BRIANTOPP, KEITHPROMISLOW, GERDADEVRIES, ROBERT MMIURA, DIANE TFINEGOOD
  // Diabetes is a disease of the glucose regulatory system that is associated with increasedmorbidity and early mortality. The primary variables of this system areb-cell mass, plasmainsulin concentrations, and plasma glucose concentrations. Existing mathematical models ofglucose regulation incorporate only glucose and/or insulin dynamics. Here we develop a novelmodel ofb-cell mass, insulin, and glucose dynamics, which consists of a system of threenonlinear ordinary di!erential equations, where glucose and insulin dynamics are fast relativetob-cell mass dynamics. For normal parameter values, the model has two stable"xed points(representing physiological and pathological steady states), separated on a slow manifold bya saddle point. Mild hyperglycemia leads to the growth of theb-cell mass (negative feedback)while extreme hyperglycemia leads to the reduction of theb-cell mass (positive feedback). Themodel predicts that there are three pathways in prolonged hyperglycemia: (1) the physiological"xed point can be shifted to a hyperglycemic level (regulated hyperglycemia), (2) the physio-logical and saddle points can be eliminated (bifurcation), and (3) progressive defects in glucoseand/or insulin dynamics can drive glucose levels up at a rate faster than the adaptation of theb-cell mass which can drive glucose levels down (dynamical hyperglycemi
  // isDescribedBy pubmed:11013117

  // Compartments:
  compartment compartment = 1;

  // Species:
  species G in compartment = 1;
  species I in compartment = 1;
  species beta in compartment = 450;

  // Parameters:
  S_i = 0.72;
  E_go = 1.44;
  R_0 = 864;
  delta = 43.2;
  alpha = 20000;
  k = 432;
  d_0 = 0.06;
  r1 = 0.00084;
  r2 = 2.4e-6;

  // Reactions:
  Production_of_glucose: => G; compartment*Function_for_formation_of_glucose(R_0);
  Uptake_of_glucose_from_the_system: G => ; compartment*Function_for_removal_of_glucose_from_the_system(E_go, S_i, I, G);  // modifiers: I
  Secretion_of_Insulin: => I; compartment*Function_for_secretion_of_insulin(beta, alpha, G, delta);  // modifiers: beta, G
  Clearance_on_insulin_from_the_system: I => ; compartment*Function_for_clearance_of_insulin_from_the_system(k, I);
  Formation_of_beta_cell: => beta; compartment*Function_for_formation_of_beta_cell(r1, G, beta);  // modifiers: G
  Loss_of_beta_cell: beta => ; compartment*Function_for_removal_of_beta_cell(d_0, r2, G, beta);  // modifiers: G

  // Unit definitions:
  unit volume = 1e-3 litre;
  unit substance = 1e-3 mole;
end
