// SBML level 2 version 4

model New_Model()
  // Hetmanski2021 rear retraction kinetic
  // Point models describing protein-protein signalling and membrane tension/contractility leading to rear retraction.
  // hasProperty mamo:MAMO_0000046

  // Compartments:
  compartment rear = 1;

  // Species:
  species RhoAgdp in rear = 100;
  species RhoAgtp in rear = 0;
  species Rock1i in rear = 100;
  species Rock1a in rear = 0;
  species RhoA_Rock1 in rear = 0; RhoA_Rock1 is "RhoA:Rock1";
  species DRFi in rear = 100;
  species DRFa in rear = 0;
  species PKN2i in rear = 100;
  species RhoA_PKN2 in rear = 0; RhoA_PKN2 is "RhoA:PKN2";
  species PKN2a in rear = 0;
  species LIMKi in rear = 100;
  species ROCK1_LIMK in rear = 0; ROCK1_LIMK is "ROCK1-LIMK";
  species LIMKa in rear = 0;
  species Cofilina in rear = 100;
  species LIMK_Cofilin in rear = 0; LIMK_Cofilin is "LIMK-Cofilin";
  species Cofilini in rear = 0;
  species Actinag in rear = 100;
  species DRF_Actin in rear = 0; DRF_Actin is "DRF:Actin";
  species Actinf in rear = 0;
  species Cofilin_Actin in rear = 0; Cofilin_Actin is "Cofilin:Actin";
  species CPI_17i in rear = 100; CPI_17i is "CPI-17i";
  species PKN2_CPI17 in rear = 0; PKN2_CPI17 is "PKN2:CPI17";
  species CPI_17a in rear = 0; CPI_17a is "CPI-17a";
  species ROCK1_CPI17 in rear = 0; ROCK1_CPI17 is "ROCK1:CPI17";
  species MLCPa in rear = 100;
  species ROCK_MLCP in rear = 0; ROCK_MLCP is "ROCK:MLCP";
  species MLCPi in rear = 0;
  species CPI17_MLCP in rear = 0; CPI17_MLCP is "CPI17:MLCP";
  species RhoA_Drf in rear = 0; RhoA_Drf is "RhoA:Drf";
  species ROCK1_DRF in rear = 0; ROCK1_DRF is "ROCK1:DRF";
  species pMLCa in rear = 0;
  species pMLCi in rear = 100;
  species MLCP_PMLC in rear = 0; MLCP_PMLC is "MLCP-PMLC";
  species Rock1_pMLC_MLCP in rear = 0; Rock1_pMLC_MLCP is "Rock1:pMLC:MLCP";
  species Cavi_Src in rear = 0; Cavi_Src is "Cavi-Src";
  species Cav1a in rear = 0;
  species Srca in rear = 50;
  species Cav1i in rear = 100;
  species Srci in rear = 50;
  species Cav_Gef in rear = 0; Cav_Gef is "Cav-Gef";
  species Gefi in rear = 50;
  species Gefa in rear = 50;
  species p190GAPi in rear = 100;
  species Src_p190 in rear = 0; Src_p190 is "Src-p190";
  species p190GAPa in rear = 0;
  species Actomyo_High in rear = 0; Actomyo_High is "Actomyo.High";
  species Polcont_High in rear = 0; Polcont_High is "Polcont.High";
  species Polcont_Low in rear = 100; Polcont_Low is "Polcont.Low";
  species Polystiff_High in rear = 100; Polystiff_High is "Polystiff.High";
  species Recoil_Fast in rear = 0; Recoil_Fast is "Recoil.Fast";
  species Tension_D in rear = 0; Tension_D is "Tension.D";
  species Tension_I in rear = 100; Tension_I is "Tension.I";
  species Actomyo_Low in rear = 100; Actomyo_Low is "Actomyo.Low";
  species Recoil_Slow in rear = 100; Recoil_Slow is "Recoil.Slow";
  species p190GAP_RhoA in rear = 0; p190GAP_RhoA is "p190GAP:RhoA";
  species Rho_Gef in rear = 0; Rho_Gef is "Rho-Gef";
  species Cava_Src in rear = 0; Cava_Src is "Cava-Src";
  species Pkn2_Actin in rear = 0; Pkn2_Actin is "Pkn2-Actin";

  // Parameters:
  PKN2___ROCK = 0.01; PKN2___ROCK is "PKN2 / ROCK";

  // Reactions:
  Rho_turnover: RhoAgtp => RhoAgdp; rear*Rho_turnover_k1*RhoAgtp;
    Rho_turnover_k1 = 0.01;
  Rock_turnover: Rock1a => Rock1i; rear*Rock_turnover_k1*Rock1a;
    Rock_turnover_k1 = 0.01;
  Pkn2_turnover: PKN2a => PKN2i; rear*Pkn2_turnover_k1*PKN2a;
    Pkn2_turnover_k1 = 0.01;
  DRF_turnover: DRFa => DRFi; rear*DRF_turnover_k1*DRFa;
    DRF_turnover_k1 = 0.01;
  LIMK_turnover: LIMKa => LIMKi; rear*LIMK_turnover_k1*LIMKa;
    LIMK_turnover_k1 = 0.01;
  Actin_turnover: Actinf => Actinag; rear*Actin_turnover_k1*Actinf;
    Actin_turnover_k1 = 0.01;
  Tension_Cav1: Tension_D + Cav1i => Tension_D + Cav1a; rear*Tension_Cav1_k1*Tension_D*Cav1i; Tension_Cav1 is "Tension.Cav1";
    Tension_Cav1_k1 = 0.01;
  Tension_increase: Tension_D => Tension_I; rear*Tension_increase_k1*Tension_D;
    Tension_increase_k1 = 0.01;
  Recoil_relaxation: Recoil_Fast => Recoil_Slow; rear*Recoil_relaxation_k1*Recoil_Fast;
    Recoil_relaxation_k1 = 0.01;
  Actomyo_relax: Actomyo_High => Actomyo_Low; rear*Actomyo_relax_k1*Actomyo_High;
    Actomyo_relax_k1 = 0.01;
  Polcont_relax: Polcont_High => Polcont_Low; rear*Polcont_relax_k1*Polcont_High;
    Polcont_relax_k1 = 0.001;
  pMLCa_Actomyo: pMLCa + Actomyo_Low + Actinf => pMLCa + Actomyo_High + Actinf; rear*pMLCa_Actomyo_k1*pMLCa*Actomyo_Low*Actinf; pMLCa_Actomyo is "pMLCa.Actomyo";
    pMLCa_Actomyo_k1 = 1e-5;
  Cav_turnover: Cav1a => Cav1i; rear*Cav_turnover_k1*Cav1a;
    Cav_turnover_k1 = 0.01;
  Gef_turnover: Gefa => Gefi; rear*Gef_turnover_k1*Gefa;
    Gef_turnover_k1 = 0.01;
  RhoA_Rock1__forward: RhoAgtp + Rock1i => RhoA_Rock1; rear*RhoA_Rock1__forward_k1*RhoAgtp*Rock1i; RhoA_Rock1__forward is "RhoA-Rock1 (forward)";
    RhoA_Rock1__forward_k1 = 0.001;
  RhoA_Rock1__backward: RhoA_Rock1 => RhoAgtp + Rock1i; rear*RhoA_Rock1__backward_k1*RhoA_Rock1; RhoA_Rock1__backward is "RhoA-Rock1 (backward)";
    RhoA_Rock1__backward_k1 = 0.0001;
  Rock1_act__forward: RhoA_Rock1 => Rock1a + RhoAgdp; rear*Rock1_act__forward_k1*RhoA_Rock1; Rock1_act__forward is "Rock1 act (forward)";
    Rock1_act__forward_k1 = 0.1;
  Rock1_act__backward: Rock1a + RhoAgdp => RhoA_Rock1; rear*Rock1_act__backward_k1*Rock1a*RhoAgdp; Rock1_act__backward is "Rock1 act (backward)";
    Rock1_act__backward_k1 = 0.01;
  RhoA_DRF__forward: RhoAgtp + DRFi => RhoA_Drf; rear*RhoA_DRF__forward_k1*RhoAgtp*DRFi; RhoA_DRF__forward is "RhoA-DRF (forward)";
    RhoA_DRF__forward_k1 = 0.001;
  RhoA_DRF__backward: RhoA_Drf => RhoAgtp + DRFi; rear*RhoA_DRF__backward_k1*RhoA_Drf; RhoA_DRF__backward is "RhoA-DRF (backward)";
    RhoA_DRF__backward_k1 = 0.0001;
  RhoA_PKN2__forward: RhoAgtp + PKN2i => RhoA_PKN2; rear*RhoA_PKN2__forward_k1*RhoAgtp*PKN2i; RhoA_PKN2__forward is "RhoA-PKN2 (forward)";
    RhoA_PKN2__forward_k1 = 0.001;
  RhoA_PKN2__backward: RhoA_PKN2 => RhoAgtp + PKN2i; rear*RhoA_PKN2__backward_k1*RhoA_PKN2; RhoA_PKN2__backward is "RhoA-PKN2 (backward)";
    RhoA_PKN2__backward_k1 = 0.0001;
  PKN2_act__forward: RhoA_PKN2 => PKN2a + RhoAgdp; rear*PKN2_act__forward_k1*RhoA_PKN2; PKN2_act__forward is "PKN2 act (forward)";
    PKN2_act__forward_k1 = 0.1;
  PKN2_act__backward: PKN2a + RhoAgdp => RhoA_PKN2; rear*PKN2_act__backward_k1*PKN2a*RhoAgdp; PKN2_act__backward is "PKN2 act (backward)";
    PKN2_act__backward_k1 = 0.01;
  DRF_act__forward: RhoA_Drf => DRFa + RhoAgdp; rear*DRF_act__forward_k1*RhoA_Drf; DRF_act__forward is "DRF act (forward)";
    DRF_act__forward_k1 = 0.1;
  DRF_act__backward: DRFa + RhoAgdp => RhoA_Drf; rear*DRF_act__backward_k1*DRFa*RhoAgdp; DRF_act__backward is "DRF act (backward)";
    DRF_act__backward_k1 = 0.01;
  ROCK1_LIMK__forward: Rock1a + LIMKi => ROCK1_LIMK; rear*ROCK1_LIMK__forward_k1*Rock1a*LIMKi; ROCK1_LIMK__forward is "ROCK1-LIMK (forward)";
    ROCK1_LIMK__forward_k1 = 0.001;
  ROCK1_LIMK__backward: ROCK1_LIMK => Rock1a + LIMKi; rear*ROCK1_LIMK__backward_k1*ROCK1_LIMK; ROCK1_LIMK__backward is "ROCK1-LIMK (backward)";
    ROCK1_LIMK__backward_k1 = 0.0001;
  LIMK_act__forward: ROCK1_LIMK => LIMKa + Rock1i; rear*LIMK_act__forward_k1*ROCK1_LIMK; LIMK_act__forward is "LIMK act (forward)";
    LIMK_act__forward_k1 = 0.01;
  LIMK_act__backward: LIMKa + Rock1i => ROCK1_LIMK; rear*LIMK_act__backward_k1*LIMKa*Rock1i; LIMK_act__backward is "LIMK act (backward)";
    LIMK_act__backward_k1 = 0.001;
  LIMK_Cofilin__forward: LIMKa + Cofilina => LIMK_Cofilin; rear*LIMK_Cofilin__forward_k1*LIMKa*Cofilina; LIMK_Cofilin__forward is "LIMK-Cofilin (forward)";
    LIMK_Cofilin__forward_k1 = 0.01;
  LIMK_Cofilin__backward: LIMK_Cofilin => LIMKa + Cofilina; rear*LIMK_Cofilin__backward_k1*LIMK_Cofilin; LIMK_Cofilin__backward is "LIMK-Cofilin (backward)";
    LIMK_Cofilin__backward_k1 = 0.001;
  Cofilin_inact__forward: LIMK_Cofilin => LIMKi + Cofilini; rear*Cofilin_inact__forward_k1*LIMK_Cofilin; Cofilin_inact__forward is "Cofilin inact (forward)";
    Cofilin_inact__forward_k1 = 0.01;
  Cofilin_inact__backward: LIMKi + Cofilini => LIMK_Cofilin; rear*Cofilin_inact__backward_k1*LIMKi*Cofilini; Cofilin_inact__backward is "Cofilin inact (backward)";
    Cofilin_inact__backward_k1 = 0.001;
  DRF_Actin__forward: DRFa + Actinag => DRF_Actin; rear*DRF_Actin__forward_k1*DRFa*Actinag; DRF_Actin__forward is "DRF-Actin (forward)";
    DRF_Actin__forward_k1 = 0.1;
  DRF_Actin__backward: DRF_Actin => DRFa + Actinag; rear*DRF_Actin__backward_k1*DRF_Actin; DRF_Actin__backward is "DRF-Actin (backward)";
    DRF_Actin__backward_k1 = 0.0001;
  Actinf_act__forward: DRF_Actin => DRFi + Actinf; rear*Actinf_act__forward_k1*DRF_Actin; Actinf_act__forward is "Actinf act (forward)";
    Actinf_act__forward_k1 = 0.1;
  Actinf_act__backward: DRFi + Actinf => DRF_Actin; rear*Actinf_act__backward_k1*DRFi*Actinf; Actinf_act__backward is "Actinf act (backward)";
    Actinf_act__backward_k1 = 0.01;
  Cofilin_Actin__forward: Cofilina + Actinf => Cofilin_Actin; rear*Cofilin_Actin__forward_k1*Cofilina*Actinf; Cofilin_Actin__forward is "Cofilin-Actin (forward)";
    Cofilin_Actin__forward_k1 = 0.0001;
  Cofilin_Actin__backward: Cofilin_Actin => Cofilina + Actinf; rear*Cofilin_Actin__backward_k1*Cofilin_Actin; Cofilin_Actin__backward is "Cofilin-Actin (backward)";
    Cofilin_Actin__backward_k1 = 1e-5;
  Actinf_inh__forward: Cofilin_Actin => Actinag + Cofilina; rear*Actinf_inh__forward_k1*Cofilin_Actin; Actinf_inh__forward is "Actinf inh (forward)";
    Actinf_inh__forward_k1 = 0.01;
  Actinf_inh__backward: Actinag + Cofilina => Cofilin_Actin; rear*Actinf_inh__backward_k1*Actinag*Cofilina; Actinf_inh__backward is "Actinf inh (backward)";
    Actinf_inh__backward_k1 = 0.001;
  PKN2_CPI_17__forward: PKN2a + CPI_17i => PKN2_CPI17; rear*PKN2_CPI_17__forward_k1*PKN2a*CPI_17i; PKN2_CPI_17__forward is "PKN2-CPI-17 (forward)";
    PKN2_CPI_17__forward_k1 = 0.01;
  PKN2_CPI_17__backward: PKN2_CPI17 => PKN2a + CPI_17i; rear*PKN2_CPI_17__backward_k1*PKN2_CPI17; PKN2_CPI_17__backward is "PKN2-CPI-17 (backward)";
    PKN2_CPI_17__backward_k1 = 0.001;
  CPI_17_act__forward: PKN2_CPI17 => CPI_17a + PKN2i; rear*CPI_17_act__forward_k1*PKN2_CPI17; CPI_17_act__forward is "CPI-17 act (forward)";
    CPI_17_act__forward_k1 = 0.01;
  CPI_17_act__backward: CPI_17a + PKN2i => PKN2_CPI17; rear*CPI_17_act__backward_k1*CPI_17a*PKN2i; CPI_17_act__backward is "CPI-17 act (backward)";
    CPI_17_act__backward_k1 = 0.001;
  ROCK1_CPI_17__forward: Rock1a + CPI_17i => ROCK1_CPI17; rear*ROCK1_CPI_17__forward_k1*Rock1a*CPI_17i; ROCK1_CPI_17__forward is "ROCK1-CPI-17 (forward)";
    ROCK1_CPI_17__forward_k1 = 0.0001;
  ROCK1_CPI_17__backward: ROCK1_CPI17 => Rock1a + CPI_17i; rear*ROCK1_CPI_17__backward_k1*ROCK1_CPI17; ROCK1_CPI_17__backward is "ROCK1-CPI-17 (backward)";
    ROCK1_CPI_17__backward_k1 = 1e-5;
  CPI_17_act_2__forward: ROCK1_CPI17 => Rock1i + CPI_17a; rear*CPI_17_act_2__forward_k1*ROCK1_CPI17; CPI_17_act_2__forward is "CPI-17 act 2 (forward)";
    CPI_17_act_2__forward_k1 = 0.01;
  CPI_17_act_2__backward: Rock1i + CPI_17a => ROCK1_CPI17; rear*CPI_17_act_2__backward_k1*Rock1i*CPI_17a; CPI_17_act_2__backward is "CPI-17 act 2 (backward)";
    CPI_17_act_2__backward_k1 = 0.001;
  CPI_17_MLCP__forward: CPI_17a + MLCPa => CPI17_MLCP; rear*CPI_17_MLCP__forward_k1*CPI_17a*MLCPa; CPI_17_MLCP__forward is "CPI-17-MLCP (forward)";
    CPI_17_MLCP__forward_k1 = 0.01;
  CPI_17_MLCP__backward: CPI17_MLCP => CPI_17a + MLCPa; rear*CPI_17_MLCP__backward_k1*CPI17_MLCP; CPI_17_MLCP__backward is "CPI-17-MLCP (backward)";
    CPI_17_MLCP__backward_k1 = 0.001;
  MLCP_inhib_2__forward: CPI17_MLCP => CPI_17i + MLCPi; rear*MLCP_inhib_2__forward_k1*CPI17_MLCP; MLCP_inhib_2__forward is "MLCP inhib 2 (forward)";
    MLCP_inhib_2__forward_k1 = 0.001;
  MLCP_inhib_2__backward: CPI_17i + MLCPi => CPI17_MLCP; rear*MLCP_inhib_2__backward_k1*CPI_17i*MLCPi; MLCP_inhib_2__backward is "MLCP inhib 2 (backward)";
    MLCP_inhib_2__backward_k1 = 0.0001;
  ROCK1_DRF__forward: Rock1a + DRFi => ROCK1_DRF; rear*ROCK1_DRF__forward_k1*Rock1a*DRFi; ROCK1_DRF__forward is "ROCK1-DRF (forward)";
    ROCK1_DRF__forward_k1 = 0.01;
  ROCK1_DRF__backward: ROCK1_DRF => Rock1a + DRFi; rear*ROCK1_DRF__backward_k1*ROCK1_DRF; ROCK1_DRF__backward is "ROCK1-DRF (backward)";
    ROCK1_DRF__backward_k1 = 0.001;
  DRF_act_2__forward: ROCK1_DRF => Rock1i + DRFa; rear*DRF_act_2__forward_k1*ROCK1_DRF; DRF_act_2__forward is "DRF act 2 (forward)";
    DRF_act_2__forward_k1 = 0.01;
  DRF_act_2__backward: Rock1i + DRFa => ROCK1_DRF; rear*DRF_act_2__backward_k1*Rock1i*DRFa; DRF_act_2__backward is "DRF act 2 (backward)";
    DRF_act_2__backward_k1 = 0.001;
  ROCK_pMLC__forward: Rock1a + pMLCi => Rock1i + pMLCa; rear*ROCK_pMLC__forward_k1*Rock1a*pMLCi; ROCK_pMLC__forward is "ROCK-pMLC (forward)";
    ROCK_pMLC__forward_k1 = 0.001;
  ROCK_pMLC__backward: Rock1i + pMLCa => Rock1a + pMLCi; rear*ROCK_pMLC__backward_k1*Rock1i*pMLCa; ROCK_pMLC__backward is "ROCK-pMLC (backward)";
    ROCK_pMLC__backward_k1 = 0.0001;
  MLCP_PMLC__forward: MLCPa + pMLCa => MLCP_PMLC; rear*MLCP_PMLC__forward_k1*MLCPa*pMLCa; MLCP_PMLC__forward is "MLCP-PMLC (forward)";
    MLCP_PMLC__forward_k1 = 0.01;
  MLCP_PMLC__backward: MLCP_PMLC => MLCPa + pMLCa; rear*MLCP_PMLC__backward_k1*MLCP_PMLC; MLCP_PMLC__backward is "MLCP-PMLC (backward)";
    MLCP_PMLC__backward_k1 = 0.001;
  pMLC_inhib__forward: MLCP_PMLC => MLCPa + pMLCi; rear*pMLC_inhib__forward_k1*MLCP_PMLC; pMLC_inhib__forward is "pMLC inhib (forward)";
    pMLC_inhib__forward_k1 = 0.01;
  pMLC_inhib__backward: MLCPa + pMLCi => MLCP_PMLC; rear*pMLC_inhib__backward_k1*MLCPa*pMLCi; pMLC_inhib__backward is "pMLC inhib (backward)";
    pMLC_inhib__backward_k1 = 0.001;
  Cav1a_Srca__forward: Cav1a + Srca => Cava_Src; rear*Cav1a_Srca__forward_k1*Cav1a*Srca; Cav1a_Srca__forward is "Cav1a.Srca (forward)";
    Cav1a_Srca__forward_k1 = 0.01;
  Cav1a_Srca__backward: Cava_Src => Cav1a + Srca; rear*Cav1a_Srca__backward_k1*Cava_Src; Cav1a_Srca__backward is "Cav1a.Srca (backward)";
    Cav1a_Srca__backward_k1 = 0.001;
  Src_inact__forward: Cava_Src => Cav1i + Srci; rear*Src_inact__forward_k1*Cava_Src; Src_inact__forward is "Src inact (forward)";
    Src_inact__forward_k1 = 0.01;
  Src_inact__backward: Cav1i + Srci => Cava_Src; rear*Src_inact__backward_k1*Cav1i*Srci; Src_inact__backward is "Src inact (backward)";
    Src_inact__backward_k1 = 0.001;
  Cav_Gef__forward: Cav1a + Gefi => Cav_Gef; rear*Cav_Gef__forward_k1*Cav1a*Gefi; Cav_Gef__forward is "Cav.Gef (forward)";
    Cav_Gef__forward_k1 = 0.01;
  Cav_Gef__backward: Cav_Gef => Cav1a + Gefi; rear*Cav_Gef__backward_k1*Cav_Gef; Cav_Gef__backward is "Cav.Gef (backward)";
    Cav_Gef__backward_k1 = 0.001;
  Cav_Gef_act__forward: Cav_Gef => Cav1i + Gefa; rear*Cav_Gef_act__forward_k1*Cav_Gef; Cav_Gef_act__forward is "Cav Gef act (forward)";
    Cav_Gef_act__forward_k1 = 0.1;
  Cav_Gef_act__backward: Cav1i + Gefa => Cav_Gef; rear*Cav_Gef_act__backward_k1*Cav1i*Gefa; Cav_Gef_act__backward is "Cav Gef act (backward)";
    Cav_Gef_act__backward_k1 = 0.01;
  Rho_GEF__forward: Gefa + RhoAgdp => Rho_Gef; rear*Rho_GEF__forward_k1*Gefa*RhoAgdp; Rho_GEF__forward is "Rho-GEF (forward)";
    Rho_GEF__forward_k1 = 0.1;
  Rho_GEF__backward: Rho_Gef => Gefa + RhoAgdp; rear*Rho_GEF__backward_k1*Rho_Gef; Rho_GEF__backward is "Rho-GEF (backward)";
    Rho_GEF__backward_k1 = 0.01;
  Src_p190__forward: Srca + p190GAPi => Src_p190; rear*Src_p190__forward_k1*Srca*p190GAPi; Src_p190__forward is "Src-p190 (forward)";
    Src_p190__forward_k1 = 0.01;
  Src_p190__backward: Src_p190 => Srca + p190GAPi; rear*Src_p190__backward_k1*Src_p190; Src_p190__backward is "Src-p190 (backward)";
    Src_p190__backward_k1 = 0.001;
  p190gapin__forward: Src_p190 => Srci + p190GAPa; rear*p190gapin__forward_k1*Src_p190; p190gapin__forward is "p190gapin (forward)";
    p190gapin__forward_k1 = 0.01;
  p190gapin__backward: Srci + p190GAPa => Src_p190; rear*p190gapin__backward_k1*Srci*p190GAPa; p190gapin__backward is "p190gapin (backward)";
    p190gapin__backward_k1 = 0.001;
  Polstiff_actomyp_polycont__forward: Polystiff_High + Actomyo_High + Polcont_Low => Polystiff_High + Actomyo_High + Polcont_High; rear*Polstiff_actomyp_polycont__forward_k1*Polystiff_High*Actomyo_High*Polcont_Low; Polstiff_actomyp_polycont__forward is "Polstiff.actomyp.polycont (forward)";
    Polstiff_actomyp_polycont__forward_k1 = 1e-7;
  Polstiff_actomyp_polycont__backward: Polystiff_High + Actomyo_High + Polcont_High => Polystiff_High + Actomyo_High + Polcont_Low; rear*Polstiff_actomyp_polycont__backward_k1*Polystiff_High*Actomyo_High*Polcont_High; Polstiff_actomyp_polycont__backward is "Polstiff.actomyp.polycont (backward)";
    Polstiff_actomyp_polycont__backward_k1 = 1e-8;
  Polcont_tension__forward: Polcont_High + Tension_I + Recoil_Fast => Polcont_High + Tension_D + Recoil_Fast; rear*Polcont_tension__forward_k1*Polcont_High*Tension_I*Recoil_Fast; Polcont_tension__forward is "Polcont.tension (forward)";
    Polcont_tension__forward_k1 = 1e-5;
  Polcont_tension__backward: Polcont_High + Tension_D + Recoil_Fast => Polcont_High + Tension_I + Recoil_Fast; rear*Polcont_tension__backward_k1*Polcont_High*Tension_D*Recoil_Fast; Polcont_tension__backward is "Polcont.tension (backward)";
    Polcont_tension__backward_k1 = 1e-6;
  Actin_Actomyo_recoil__forward: Actinf + Actomyo_High + Recoil_Slow => Actinf + Actomyo_High + Recoil_Fast; rear*Actin_Actomyo_recoil__forward_k1*Actinf*Actomyo_High*Recoil_Slow; Actin_Actomyo_recoil__forward is "Actin.Actomyo.recoil (forward)";
    Actin_Actomyo_recoil__forward_k1 = 1e-5;
  Actin_Actomyo_recoil__backward: Actinf + Actomyo_High + Recoil_Fast => Actinf + Actomyo_High + Recoil_Slow; rear*Actin_Actomyo_recoil__backward_k1*Actinf*Actomyo_High*Recoil_Fast; Actin_Actomyo_recoil__backward is "Actin.Actomyo.recoil (backward)";
    Actin_Actomyo_recoil__backward_k1 = 1e-6;
  Src_Cav1_act__forward: Cavi_Src => Cav1a + Srca; rear*Src_Cav1_act__forward_k1*Cavi_Src; Src_Cav1_act__forward is "Src Cav1 act (forward)";
    Src_Cav1_act__forward_k1 = 0.01;
  Src_Cav1_act__backward: Cav1a + Srca => Cavi_Src; rear*Src_Cav1_act__backward_k1*Cav1a*Srca; Src_Cav1_act__backward is "Src Cav1 act (backward)";
    Src_Cav1_act__backward_k1 = 0.001;
  RhoA_GAP_binding__forward: p190GAPa + RhoAgtp => p190GAP_RhoA; rear*RhoA_GAP_binding__forward_k1*p190GAPa*RhoAgtp; RhoA_GAP_binding__forward is "RhoA-GAP binding (forward)";
    RhoA_GAP_binding__forward_k1 = 0.001;
  RhoA_GAP_binding__backward: p190GAP_RhoA => p190GAPa + RhoAgtp; rear*RhoA_GAP_binding__backward_k1*p190GAP_RhoA; RhoA_GAP_binding__backward is "RhoA-GAP binding (backward)";
    RhoA_GAP_binding__backward_k1 = 0.0001;
  RhoA_inact__forward: p190GAP_RhoA => p190GAPi + RhoAgdp; rear*RhoA_inact__forward_k1*p190GAP_RhoA; RhoA_inact__forward is "RhoA inact (forward)";
    RhoA_inact__forward_k1 = 0.1;
  RhoA_inact__backward: p190GAPi + RhoAgdp => p190GAP_RhoA; rear*RhoA_inact__backward_k1*p190GAPi*RhoAgdp; RhoA_inact__backward is "RhoA inact (backward)";
    RhoA_inact__backward_k1 = 0.01;
  RhoA_act__forward: Rho_Gef => RhoAgtp + Gefi; rear*RhoA_act__forward_k1*Rho_Gef; RhoA_act__forward is "RhoA act (forward)";
    RhoA_act__forward_k1 = 0.1;
  RhoA_act__backward: RhoAgtp + Gefi => Rho_Gef; rear*RhoA_act__backward_k1*RhoAgtp*Gefi; RhoA_act__backward is "RhoA act (backward)";
    RhoA_act__backward_k1 = 0.01;
  PKN2_Actin__forward: PKN2a + Actinag => Pkn2_Actin; rear*PKN2_Actin__forward_k1*PKN2a*Actinag; PKN2_Actin__forward is "PKN2-Actin (forward)";
    PKN2_Actin__forward_k1 = 0.001;
  PKN2_Actin__backward: Pkn2_Actin => PKN2a + Actinag; rear*PKN2_Actin__backward_k1*Pkn2_Actin; PKN2_Actin__backward is "PKN2-Actin (backward)";
    PKN2_Actin__backward_k1 = 0.0001;
  Actinf_act_2__forward: Pkn2_Actin => PKN2i + Actinf; rear*Actinf_act_2__forward_k1*Pkn2_Actin; Actinf_act_2__forward is "Actinf act 2 (forward)";
    Actinf_act_2__forward_k1 = 0.001;
  Actinf_act_2__backward: PKN2i + Actinf => Pkn2_Actin; rear*Actinf_act_2__backward_k1*PKN2i*Actinf; Actinf_act_2__backward is "Actinf act 2 (backward)";
    Actinf_act_2__backward_k1 = 0.0001;
  Cav1i_Src__forward: Cav1i + Srca => Cavi_Src; rear*Cav1i_Src__forward_k1*Cav1i*Srca; Cav1i_Src__forward is "Cav1i-Src (forward)";
    Cav1i_Src__forward_k1 = 0.01;
  Cav1i_Src__backward: Cavi_Src => Cav1i + Srca; rear*Cav1i_Src__backward_k1*Cavi_Src; Cav1i_Src__backward is "Cav1i-Src (backward)";
    Cav1i_Src__backward_k1 = 0.001;

  // Unit definitions:
  unit volume = 1e-3 litre;
  unit substance = item;
end
